Thu Dec  1 13:52:37 EST 2022
;Model Desc: Two Compartment model with Clearance and central volume modeled with covariates age and gender
;Project Name: nm7examples
;Project ID: NO PROJECT DESCRIPTION

$PROB RUN# example2 (from sampc)
$INPUT C SET ID JID TIME DV=CONC AMT=DOSE RATE EVID MDV CMT GNDR AGE
$DATA ../example2.csv IGNORE=C
$SUBROUTINES ADVAN3 TRANS4

$PK
; LCLM=log transformed clearance, male
LCLM=THETA(1)
;LCLF=log transformed clearance, female.
LCLF=THETA(2)
; CLAM=CL age slope, male
CLAM=THETA(3)
; CLAF=CL age slope, female
CLAF=THETA(4)
; LV1M=log transformed V1, male
LV1M=THETA(5)
; LV1F=log transformed V1, female
LV1F=THETA(6)
; V1AM=V1 age slope, male
V1AM=THETA(7)
; V1AF=V1 age slope, female
V1AF=THETA(8)
; LAGE=log transformed age
LAGE=DLOG(AGE)
;Mean of ETA1, the inter-subject deviation of Clearance, is ultimately modeled as linear function
;of THETA(1) to THETA(4).  Relating thetas to Mus by linear functions is not essential for ITS,
;IMP, or IMPMAP methods, but is very helpful for MCMC methods such as SAEM and BAYES.
MU_1=(1.0-GNDR)*(LCLM+LAGE*CLAM) + GNDR*(LCLF+LAGE*CLAF)
;Mean of ETA2, the inter-subject deviation of V1, is ultimately modeled as linear function of
; THETA(5) to THETA(8)
MU_2=(1.0-GNDR)*(LV1M+LAGE*V1AM) + GNDR*(LV1F+LAGE*V1AF)
MU_3=THETA(9) + THETA(12)
MU_4=THETA(10) + THETA(12)
CL=DEXP(MU_1+ETA(1))
V1=DEXP(MU_2+ETA(2))
Q=DEXP(MU_3+ETA(3))
V2=DEXP(MU_4+ETA(4))
S1=V1

$ERROR
CALLFL=0
; Option to model the residual error coefficient in THETA(11), rather than in SIGMA.
SDSL=THETA(11)
W=F*SDSL
Y = F + W*EPS(1)
IPRED=F
IWRES=(DV-F)/W

;Initial THETAs
$THETA
( 0.7 ) ;[LCLM]
( 0.7 ) ;[LCLF]
( 2 )   ;[CLAM]
( 2.0);[CLAF]
( 0.7 ) ;[LV1M]
( 0.7 ) ;[LV1F]
( 2.0 )   ;[V1AM]
( 2.0 )   ;[V1AF]
( 0.7 ) ;[MU_3]
(  0.7 );[MU_4]
( 0.3 )     ;[SDSL]
( 0.3 )     ;[fake]

;Initial OMEGAs
$OMEGA BLOCK(4)
0.5  ;[p]
0.001  ;[f]
0.5  ;[p]
0.001 ;[f]
0.001 ;[f]
0.5  ;[p]
0.001 ;[f]
0.001 ;[f]
0.001 ;[f]
0.5 ;[p]

;SIGMA is 1.0 fixed, serves as unscaled variance for EPS(1).  THETA(11) takes up the
; residual error scaling.
$SIGMA
(1.0 FIXED)

; Edited original example2.ctl to be SAEM => IMP
; because that is a common pattern
$EST METHOD=SAEM NBURN=5 NITER=5 PRINT=10 ISAMPLE=2
     ISAMPLE_M1=1 ISAMPLE_M2=1 ISAMPLE_M3=1
     CTYPE=3 CITER=10 CALPHA=0.05 FILE=saem.ext
$EST METHOD=IMP INTERACTION EONLY=1 NITER=5 ISAMPLE=3000 PRINT=1 SIGL=8 SEED=123334
     CTYPE=3 CITER=10 CALPHA=0.05 FILE=example2_saemimp.ext
$COV PRINT=E UNCONDITIONAL

NM-TRAN MESSAGES
 WARNINGS AND ERRORS (IF ANY) FOR PROBLEM    1
 (WARNING  2) NM-TRAN INFERS THAT THE DATA ARE POPULATION.
 (WARNING  121) INTERACTION IS IMPLIED WITH EM/BAYES ESTIMATION METHODS
 (MU_WARNING 6) THETA(012): SHOULD BE ASSOCIATED WITH ONLY ONE MU_.
 (MU_WARNING 26) DATA ITEM(S) USED IN DEFINITION OF MU_(S) SHOULD BE CONSTANT FOR INDIV. REC.:
  GNDR AGE
 LIM VALUES MAXLIM ASSESSED BY NMTRAN: 1,2,3,4,5,6,7,8,10,11,13,15,16

1NONLINEAR MIXED EFFECTS MODEL PROGRAM (NONMEM) VERSION 7.5.0
 ORIGINALLY DEVELOPED BY STUART BEAL, LEWIS SHEINER, AND ALISON BOECKMANN
 CURRENT DEVELOPERS ARE ROBERT BAUER, ICON DEVELOPMENT SOLUTIONS,
 AND ALISON BOECKMANN. IMPLEMENTATION, EFFICIENCY, AND STANDARDIZATION
 PERFORMED BY NOUS INFOSYSTEMS.
 PROBLEM NO.:         1
 RUN# example2 (from sampc)
 TOT. NO. OF OBS RECS:     2000
 TOT. NO. OF INDIVIDUALS:      400
 TWO COMPARTMENT MODEL (ADVAN3)
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 #TBLN:      1
 #METH: Stochastic Approximation Expectation-Maximization
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
 #TERM:
 STOCHASTIC PORTION WAS NOT TESTED FOR CONVERGENCE
 REDUCED STOCHASTIC PORTION WAS COMPLETED

 ETABAR IS THE ARITHMETIC MEAN OF THE ETA-ESTIMATES,
 AND THE P-VALUE IS GIVEN FOR THE NULL HYPOTHESIS THAT THE TRUE MEAN IS 0.

 ETABAR:         5.7793E-02  5.4870E-02 -6.6242E-03  2.5427E-02
 SE:             2.9051E-02  6.3744E-02  5.3336E-02  5.1757E-02
 N:                     400         400         400         400

 P VAL.:         4.6664E-02  3.8936E-01  9.0116E-01  6.2322E-01

 ETASHRINKSD(%)  3.9885E+01  3.5817E+01  3.7685E+01  3.6263E+01
 ETASHRINKVR(%)  6.3861E+01  5.8805E+01  6.1168E+01  5.9376E+01
 EBVSHRINKSD(%)  3.4910E+01  3.2146E+01  3.6248E+01  3.5266E+01
 EBVSHRINKVR(%)  5.7633E+01  5.3958E+01  5.9357E+01  5.8095E+01
 RELATIVEINF(%)  3.9418E+01  4.5597E+01  4.0139E+01  4.1590E+01
 EPSSHRINKSD(%)  1.0000E-10
 EPSSHRINKVR(%)  1.0000E-10


 TOTAL DATA POINTS NORMALLY DISTRIBUTED (N):         2000
 N*LOG(2PI) CONSTANT TO OBJECTIVE FUNCTION:    3675.7541328186908
 OBJECTIVE FUNCTION VALUE WITHOUT CONSTANT:   -1656.4083216283746
 OBJECTIVE FUNCTION VALUE WITH CONSTANT:       2019.3458111903162
 REPORTED OBJECTIVE FUNCTION DOES NOT CONTAIN CONSTANT

 TOTAL EFFECTIVE ETAS (NIND*NETA):                          1600
 NIND*NETA*LOG(2PI) CONSTANT TO OBJECTIVE FUNCTION:    2940.6033062549527
 OBJECTIVE FUNCTION VALUE WITHOUT CONSTANT:   -1656.4083216283746
 OBJECTIVE FUNCTION VALUE WITH CONSTANT:       1284.1949846265782
 REPORTED OBJECTIVE FUNCTION DOES NOT CONTAIN CONSTANT


 #TERE:
 Elapsed estimation  time in seconds:     0.55

 Number of Negative Eigenvalues in Matrix=           1
 Most negative value=  -8402238104838.9307
 Most positive value=   912900.60091712442
 Forcing positive definiteness
 Root mean square deviation of matrix from original=    1.3542958994976772E-018

 Elapsed covariance  time in seconds:     0.02

 ********************                STOCHASTIC APPROXIMATION EXPECTATION-MAXIMIZATION               ********************
 #OBJT:**************                        FINAL VALUE OF LIKELIHOOD FUNCTION                      ********************
 #OBJV:********************************************    -1656.408       **************************************************

 ********************                STOCHASTIC APPROXIMATION EXPECTATION-MAXIMIZATION               ********************
 ********************                             FINAL PARAMETER ESTIMATE                           ********************

 THETA - VECTOR OF FIXED EFFECTS PARAMETERS   *********
         TH 1      TH 2      TH 3      TH 4      TH 5      TH 6      TH 7      TH 8      TH 9      TH10      TH11      TH12
         1.48E+00  2.03E+00 -3.97E-01 -2.68E-01  3.27E-02  1.07E+00  2.00E-01 -1.01E-01 -4.94E-01  7.47E-01  3.34E-01  3.94E-01

 OMEGA - COV MATRIX FOR RANDOM EFFECTS - ETAS  ********
         ETA1      ETA2      ETA3      ETA4
 ETA1
+        9.36E-01
 ETA2
+        1.25E+00  3.96E+00
 ETA3
+        9.24E-02  1.12E-01  2.94E+00
 ETA4
+        2.16E-01 -2.14E-01  6.85E-01  2.64E+00

 SIGMA - COV MATRIX FOR RANDOM EFFECTS - EPSILONS  ****
         EPS1
 EPS1
+        1.00E+00

 OMEGA - CORR MATRIX FOR RANDOM EFFECTS - ETAS  *******
         ETA1      ETA2      ETA3      ETA4
 ETA1
+        9.68E-01
 ETA2
+        6.50E-01  1.99E+00
 ETA3
+        5.57E-02  3.28E-02  1.71E+00
 ETA4
+        1.37E-01 -6.63E-02  2.46E-01  1.63E+00

 SIGMA - CORR MATRIX FOR RANDOM EFFECTS - EPSILONS  ***
         EPS1
 EPS1
+        1.00E+00

 ********************                STOCHASTIC APPROXIMATION EXPECTATION-MAXIMIZATION               ********************
 ********************                          STANDARD ERROR OF ESTIMATE (S)                        ********************

 THETA - VECTOR OF FIXED EFFECTS PARAMETERS   *********
         TH 1      TH 2      TH 3      TH 4      TH 5      TH 6      TH 7      TH 8      TH 9      TH10      TH11      TH12
         4.56E-01  3.73E-01  1.33E-01  1.10E-01  1.03E+00  8.01E-01  2.95E-01  2.36E-01  5.46E+05  5.46E+05  1.08E-03  5.46E+05

 OMEGA - COV MATRIX FOR RANDOM EFFECTS - ETAS  ********
         ETA1      ETA2      ETA3      ETA4
 ETA1
+        8.48E-02
 ETA2
+        1.70E-01  5.26E-01
 ETA3
+        1.51E-01  3.06E-01  3.34E-01
 ETA4
+        1.40E-01  4.09E-01  2.80E-01  3.42E-01

 SIGMA - COV MATRIX FOR RANDOM EFFECTS - EPSILONS  ****
         EPS1
 EPS1
+        0.00E+00

 OMEGA - CORR MATRIX FOR RANDOM EFFECTS - ETAS  *******
         ETA1      ETA2      ETA3      ETA4
 ETA1
+        4.38E-02
 ETA2
+        4.72E-02  1.32E-01
 ETA3
+        9.12E-02  8.94E-02  9.73E-02
 ETA4
+        8.44E-02  1.25E-01  9.15E-02  1.05E-01

 SIGMA - CORR MATRIX FOR RANDOM EFFECTS - EPSILONS  ***
         EPS1
 EPS1
+       .........
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
 ********************                STOCHASTIC APPROXIMATION EXPECTATION-MAXIMIZATION               ********************
 ********************                    EIGENVALUES OF COR MATRIX OF ESTIMATE (S)                   ********************

             1         2         3         4         5         6         7         8         9        10        11        12
             13        14        15        16        17        18        19        20        21        22
         2.30E-14  4.68E-14  9.13E-03  1.76E-02  3.33E-02  5.78E-02  1.02E-01  2.34E-01  2.70E-01  3.28E-01  5.40E-01  6.85E-01
          7.29E-01  8.92E-01  9.81E-01  1.46E+00  1.71E+00  1.85E+00  2.41E+00  3.00E+00  3.32E+00  3.37E+00
 #TBLN:      2
 #METH: Objective Function Evaluation by Importance Sampling
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
 #TERM:
 EXPECTATION ONLY PROCESS WAS NOT COMPLETED

 ETABAR IS THE ARITHMETIC MEAN OF THE ETA-ESTIMATES,
 AND THE P-VALUE IS GIVEN FOR THE NULL HYPOTHESIS THAT THE TRUE MEAN IS 0.

 ETABAR:         1.0932E+00  9.4346E-01  3.0616E-01  8.4427E-01
 SE:             1.1074E-02  2.3496E-02  1.4263E-02  1.5893E-02
 N:                     400         400         400         400

 P VAL.:         0.0000E+00  0.0000E+00  3.642E-102  0.0000E+00

 ETASHRINKSD(%)  7.7084E+01  7.6343E+01  8.3335E+01  8.0428E+01
 ETASHRINKVR(%)  9.4748E+01  9.4403E+01  9.7223E+01  9.6169E+01
 EBVSHRINKSD(%)  4.6454E+00  3.9236E+00  1.2772E+01  1.0595E+01
 EBVSHRINKVR(%)  9.0750E+00  7.6933E+00  2.3914E+01  2.0068E+01
 RELATIVEINF(%)  9.2836E+01  9.2207E+01  7.6896E+01  8.0988E+01
 EPSSHRINKSD(%)  4.2624E+01
 EPSSHRINKVR(%)  6.7080E+01


 TOTAL DATA POINTS NORMALLY DISTRIBUTED (N):         2000
 N*LOG(2PI) CONSTANT TO OBJECTIVE FUNCTION:    3675.7541328186908
 OBJECTIVE FUNCTION VALUE WITHOUT CONSTANT:   -3751.3678224329951
 OBJECTIVE FUNCTION VALUE WITH CONSTANT:      -75.613689614304349
 REPORTED OBJECTIVE FUNCTION DOES NOT CONTAIN CONSTANT

 TOTAL EFFECTIVE ETAS (NIND*NETA):                          1600


 #TERE:
 Elapsed estimation  time in seconds:    25.71

 Number of Negative Eigenvalues in Matrix=           8
 Most negative value=  -26518.919375822308
 Most positive value=   7048.4801057733921
 Forcing positive definiteness
 Root mean square deviation of matrix from original=    1.8975979340408018

 Number of Negative Eigenvalues in Matrix=           1
 Most negative value=   1.1805660558769108E-014
 Most positive value=   84705128952501.656
 Forcing positive definiteness
 Root mean square deviation of matrix from original=    8.1666498663136214E-017

 Elapsed covariance  time in seconds:    40.04

 ********************               OBJECTIVE FUNCTION EVALUATION BY IMPORTANCE SAMPLING             ********************
 #OBJT:**************                        FINAL VALUE OF OBJECTIVE FUNCTION                       ********************
 #OBJV:********************************************    -3751.368       **************************************************

 ********************               OBJECTIVE FUNCTION EVALUATION BY IMPORTANCE SAMPLING             ********************
 ********************                             FINAL PARAMETER ESTIMATE                           ********************

 THETA - VECTOR OF FIXED EFFECTS PARAMETERS   *********
         TH 1      TH 2      TH 3      TH 4      TH 5      TH 6      TH 7      TH 8      TH 9      TH10      TH11      TH12
         1.48E+00  2.03E+00 -3.97E-01 -2.68E-01  3.27E-02  1.07E+00  2.00E-01 -1.01E-01 -4.94E-01  7.47E-01  3.34E-01  3.94E-01

 OMEGA - COV MATRIX FOR RANDOM EFFECTS - ETAS  ********
         ETA1      ETA2      ETA3      ETA4
 ETA1
+        9.36E-01
 ETA2
+        1.25E+00  3.96E+00
 ETA3
+        9.24E-02  1.12E-01  2.94E+00
 ETA4
+        2.16E-01 -2.14E-01  6.85E-01  2.64E+00

 SIGMA - COV MATRIX FOR RANDOM EFFECTS - EPSILONS  ****
         EPS1
 EPS1
+        1.00E+00

 OMEGA - CORR MATRIX FOR RANDOM EFFECTS - ETAS  *******
         ETA1      ETA2      ETA3      ETA4
 ETA1
+        9.68E-01
 ETA2
+        6.50E-01  1.99E+00
 ETA3
+        5.57E-02  3.28E-02  1.71E+00
 ETA4
+        1.37E-01 -6.63E-02  2.46E-01  1.63E+00

 SIGMA - CORR MATRIX FOR RANDOM EFFECTS - EPSILONS  ***
         EPS1
 EPS1
+        1.00E+00

 ********************               OBJECTIVE FUNCTION EVALUATION BY IMPORTANCE SAMPLING             ********************
 ********************                         STANDARD ERROR OF ESTIMATE (RSR)                       ********************

 THETA - VECTOR OF FIXED EFFECTS PARAMETERS   *********
         TH 1      TH 2      TH 3      TH 4      TH 5      TH 6      TH 7      TH 8      TH 9      TH10      TH11      TH12
         4.48E-01  3.44E-01  1.15E-01  9.13E-02  3.97E-01  2.44E-01  1.01E-01  7.02E-02  7.83E-02  1.26E-01  1.04E-01  1.13E-01

 OMEGA - COV MATRIX FOR RANDOM EFFECTS - ETAS  ********
         ETA1      ETA2      ETA3      ETA4
 ETA1
+        4.05E-02
 ETA2
+        1.06E-01  1.73E-01
 ETA3
+        9.24E-02  3.85E-02  6.23E-02
 ETA4
+        2.74E-02  9.32E-02  6.93E-02  2.78E-02

 SIGMA - COV MATRIX FOR RANDOM EFFECTS - EPSILONS  ****
         EPS1
 EPS1
+        0.00E+00

 OMEGA - CORR MATRIX FOR RANDOM EFFECTS - ETAS  *******
         ETA1      ETA2      ETA3      ETA4
 ETA1
+        2.09E-02
 ETA2
+        2.84E-02  4.36E-02
 ETA3
+        5.61E-02  1.10E-02  1.82E-02
 ETA4
+        1.49E-02  3.05E-02  2.20E-02  8.55E-03

 SIGMA - CORR MATRIX FOR RANDOM EFFECTS - EPSILONS  ***
         EPS1
 EPS1
+       .........
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
 ********************               OBJECTIVE FUNCTION EVALUATION BY IMPORTANCE SAMPLING             ********************
 ********************                   EIGENVALUES OF COR MATRIX OF ESTIMATE (RSR)                  ********************

             1         2         3         4         5         6         7         8         9        10        11        12
             13        14        15        16        17        18        19        20        21        22
         1.51E-08  9.35E-07  3.04E-06  1.17E-05  4.57E-05  3.42E-04  4.74E-04  7.19E-04  1.02E-03  1.24E-03  3.23E-03  9.96E-03
         -1.07E-02  2.18E-02  1.05E-01  2.79E-01  4.81E-01  6.25E-01  2.41E+00  2.51E+00  5.40E+00  1.02E+01
 Elapsed postprocess time in seconds:     0.00
 Elapsed finaloutput time in seconds:     0.00
 #CPUT: Total CPU Time in Seconds,       66.589
