Wed Jul  8 17:29:44 EDT 2020
$PROBLEM BS-66 106-104 + COV-effects(CRCL, AGE) on CL

$INPUT C ID NUM OID SUBJ TIME SEQ CMT EVID AMT DV AGE WT CRCL ALB BMI AAG
       SCR AST ALT HT CP TAFD TAD LDOS MDV BLQ PHASE

$DATA ../data/66.csv IGNORE=(C='C', BLQ=1)

$SUBROUTINE ADVAN4 TRANS4

$PK

;log transformed PK parms

V2WT = LOG(WT/70)
CLWT = LOG(WT/70)*0.75
CLCR = LOG(CRCL/90)*THETA(6)
CLAGE = LOG(AGE/35)*THETA(7)
V3WT = LOG(WT/70)
QWT  = LOG(WT/70)*0.75
CLALB = LOG(ALB/4.5)*THETA(8)

KA   = EXP(THETA(1)+ETA(1))
V2   = EXP(THETA(2)+V2WT+ETA(2))
CL   = EXP(THETA(3)+CLWT+CLCR+CLAGE+CLALB+ETA(3))
V3   = EXP(THETA(4)+V3WT)
Q    = EXP(THETA(5)+QWT)

S2 = V2/1000 ; dose in mcg, conc in mcg/mL

$ERROR
IPRED = F
Y=IPRED*(1+EPS(1))

$THETA  ; log values
(0.5)   ;  1 KA (1/hr) - 1.5
(3.5)   ;  2 V2 (L) - 60
(1)     ;  3 CL (L/hr) - 3.5
(4)     ;  4 V3 (L) - 70
(2)     ;  5 Q  (L/hr) - 4
(1)     ;  6 CLCR~CL ()
(1)     ;  7 AGE~CL ()
(0.5)   ;  8 ALB~CL ()

$OMEGA BLOCK(3)
0.2   ;ETA(KA)
0.01 0.2   ;ETA(V2)
0.01 0.01 0.2   ;ETA(CL)

$SIGMA
0.05     ; 1 pro error

$EST MAXEVAL=9999 METHOD=1 INTER SIGL=6 NSIG=3 PRINT=1

NM-TRAN MESSAGES
 WARNINGS AND ERRORS (IF ANY) FOR PROBLEM    1
 (WARNING  2) NM-TRAN INFERS THAT THE DATA ARE POPULATION.

1NONLINEAR MIXED EFFECTS MODEL PROGRAM (NONMEM) VERSION 7.4.4
 ORIGINALLY DEVELOPED BY STUART BEAL, LEWIS SHEINER, AND ALISON BOECKMANN
 CURRENT DEVELOPERS ARE ROBERT BAUER, ICON DEVELOPMENT SOLUTIONS,
 AND ALISON BOECKMANN. IMPLEMENTATION, EFFICIENCY, AND STANDARDIZATION
 PERFORMED BY NOUS INFOSYSTEMS.
 PROBLEM NO.:         1
 BS-66 106-104 + COV-effects(CRCL, AGE) on CL
 TOT. NO. OF OBS RECS:     3176
 TOT. NO. OF INDIVIDUALS:      160
 TWO COMPARTMENT MODEL WITH FIRST-ORDER ABSORPTION (ADVAN4)
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 #TBLN:      1
 #METH: First Order Conditional Estimation with Interaction
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
0PRED EXIT CODE = 1
0INDIVIDUAL NO.      89   ID= 8.90000000000000E+01   (WITHIN-INDIVIDUAL) DATA REC NO.   2
 THETA=
  4.01E-01   1.68E+00   1.64E+00   6.59E+00  -2.85E+00   6.30E-01   7.16E-01   4.71E-01
 ETA=
  1.26E+00  -5.29E+00  -3.29E+01
 OCCURS DURING SEARCH FOR ETA AT A NONZERO VALUE OF ETA
 A ROOT OF THE CHARACTERISTIC EQUATION IS ZERO BECAUSE
 K*K32 IS MUCH SMALLER THAN  (K+K23+K32)**2.
 PERHAPS K OR K32 IS VERY SMALL, OR K23 IS VERY LARGE.
0PROGRAM TERMINATED BY OBJ
 MESSAGE ISSUED FROM ESTIMATION STEP

 #TERM:

 TOTAL DATA POINTS NORMALLY DISTRIBUTED (N):         1739
 N*LOG(2PI) CONSTANT TO OBJECTIVE FUNCTION:    3196.0682184858515
 OBJECTIVE FUNCTION VALUE WITHOUT CONSTANT:    32024.417482102512
 OBJECTIVE FUNCTION VALUE WITH CONSTANT:       35220.485700588360
 REPORTED OBJECTIVE FUNCTION DOES NOT CONTAIN CONSTANT

 TOTAL EFFECTIVE ETAS (NIND*NETA):                           264


 #TERE:
 Elapsed estimation  time in seconds:     5.00
 #CPUT: Total CPU Time in Seconds,        4.679
