Fri Jul 12 09:27:14 EDT 2019
$PROB 1 model, 1 comp
$INPUT C ID TIME DV WT AMT EVID
$DATA ../../derived/mock1.csv IGNORE=C
$SUB ADVAN2 TRANS2        ; general non-lin model

; individual PK parameters
$PK
  TVCL=THETA(1)*(WT/70)**(0.75)
  CL=TVCL * EXP(ETA(1))   ; clearance
  TVV=THETA(2)*(WT/70)                             ; initial estimate of typical volume of di
  V=TVV*EXP(ETA(2))            ; volume
  S2=V                                    ; scale parameter for compartment 1
  K = CL/V
  KA=THETA(3)*EXP(ETA(3))                 ; KA

; error returns the model prediction F
$ERROR
  Y=F + F*EPS(1) +EPS(2)
  IPRED=F

; initial estimates of parameters
; TVKA = 0.4, TVCL = 1.8, TVV = 12.7
$THETA
 (0, 1, 100)    ; CL 1.8
 (0, 15, 100)  ; V  12.7
 (0, 0.3, 5)    ; KA

; initial estimate of inter-subject variability (matrix). also ETA
$OMEGA
0.08    ; CL Variance
0.08    ; V Variance
0.15;   ; KA Variance

; intial estimate of residual error. EPS(1) and EPS(2) also ERR(1) and ERR(2)
$SIGMA
0.04 ;  0.04 proportional error
0.1   ; 0.1  additive error

$ESTIMATION MAXEVAL=9999 PRINT=1 METH=1 INT MSF=./1.msf

$TABLE NOPRINT ONEHEADER FILE=./1.tab
 ID TIME IPRED EVID MDV

NM-TRAN MESSAGES
 WARNINGS AND ERRORS (IF ANY) FOR PROBLEM    1
 (WARNING  2) NM-TRAN INFERS THAT THE DATA ARE POPULATION.

1NONLINEAR MIXED EFFECTS MODEL PROGRAM (NONMEM) VERSION 7.4.3
 ORIGINALLY DEVELOPED BY STUART BEAL, LEWIS SHEINER, AND ALISON BOECKMANN
 CURRENT DEVELOPERS ARE ROBERT BAUER, ICON DEVELOPMENT SOLUTIONS,
 AND ALISON BOECKMANN. IMPLEMENTATION, EFFICIENCY, AND STANDARDIZATION
 PERFORMED BY NOUS INFOSYSTEMS.
 PROBLEM NO.:         1
 1 model, 1 comp
 TOT. NO. OF OBS RECS:      442
 TOT. NO. OF INDIVIDUALS:       50
 ONE COMPARTMENT MODEL WITH FIRST-ORDER ABSORPTION (ADVAN2)
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 #TBLN:      1
 #METH: First Order Conditional Estimation with Interaction
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
 #TERM:
0MINIMIZATION SUCCESSFUL
 NO. OF FUNCTION EVALUATIONS USED:      178
 NO. OF SIG. DIGITS IN FINAL EST.:  3.1

 ETABAR IS THE ARITHMETIC MEAN OF THE ETA-ESTIMATES,
 AND THE P-VALUE IS GIVEN FOR THE NULL HYPOTHESIS THAT THE TRUE MEAN IS 0.

 ETABAR:        -1.7084E-03 -2.1531E-03  3.7863E-04
 SE:             4.3013E-02  2.2256E-02  5.4386E-02
 N:                      50          50          50

 P VAL.:         9.6832E-01  9.2293E-01  9.9445E-01

 ETASHRINKSD(%)  4.0774E+00  2.9015E+01  1.1401E+01
 ETASHRINKVR(%)  7.9885E+00  4.9611E+01  2.1502E+01
 EBVSHRINKSD(%)  4.0725E+00  2.8322E+01  1.2255E+01
 EBVSHRINKVR(%)  7.9791E+00  4.8623E+01  2.3009E+01
 EPSSHRINKSD(%)  1.2507E+01  1.2507E+01
 EPSSHRINKVR(%)  2.3451E+01  2.3451E+01


 TOTAL DATA POINTS NORMALLY DISTRIBUTED (N):          442
 N*LOG(2PI) CONSTANT TO OBJECTIVE FUNCTION:    812.34166335293060
 OBJECTIVE FUNCTION VALUE WITHOUT CONSTANT:    759.60120961454004
 OBJECTIVE FUNCTION VALUE WITH CONSTANT:       1571.9428729674705
 REPORTED OBJECTIVE FUNCTION DOES NOT CONTAIN CONSTANT

 TOTAL EFFECTIVE ETAS (NIND*NETA):                           150


 #TERE:
 Elapsed estimation  time in seconds:     0.68
 Elapsed postprocess time in seconds:     0.02

 ********************               FIRST ORDER CONDITIONAL ESTIMATION WITH INTERACTION              ********************
 #OBJT:**************                       MINIMUM VALUE OF OBJECTIVE FUNCTION                      ********************
 #OBJV:********************************************      759.601       **************************************************

 ********************               FIRST ORDER CONDITIONAL ESTIMATION WITH INTERACTION              ********************
 ********************                             FINAL PARAMETER ESTIMATE                           ********************

 THETA - VECTOR OF FIXED EFFECTS PARAMETERS   *********
         TH 1      TH 2      TH 3
         1.90E+00  1.27E+01  4.53E-01

 OMEGA - COV MATRIX FOR RANDOM EFFECTS - ETAS  ********
         ETA1      ETA2      ETA3
 ETA1
+        1.03E-01
 ETA2
+        0.00E+00  5.02E-02
 ETA3
+        0.00E+00  0.00E+00  1.92E-01

 SIGMA - COV MATRIX FOR RANDOM EFFECTS - EPSILONS  ****
         EPS1      EPS2
 EPS1
+        3.99E-02
 EPS2
+        0.00E+00  7.38E-02

 OMEGA - CORR MATRIX FOR RANDOM EFFECTS - ETAS  *******
         ETA1      ETA2      ETA3
 ETA1
+        3.20E-01
 ETA2
+        0.00E+00  2.24E-01
 ETA3
+        0.00E+00  0.00E+00  4.38E-01

 SIGMA - CORR MATRIX FOR RANDOM EFFECTS - EPSILONS  ***
         EPS1      EPS2
 EPS1
+        2.00E-01
 EPS2
+        0.00E+00  2.72E-01
 Elapsed finaloutput time in seconds:     0.01
 #CPUT: Total CPU Time in Seconds,        0.730
