Fri Oct 25 11:48:11 UTC 2019
GNU Fortran (Ubuntu 6.2.0-3ubuntu11~14.04) 6.2.0 20160901
Copyright (C) 2016 Free Software Foundation, Inc.
This is free software; see the source for copying conditions.  There is NO
warranty; not even for MERCHANTABILITY or FITNESS FOR A PARTICULAR PURPOSE.

$PROBLEM 10 mixture model and IOV on CL
$INPUT C ID DV AMT II ADDL TIME RATE HT WT CLCR SEX AGE
EVID VIST MDV
$DATA  ../MixSim.csv IGNORE=C
$SUB ADVAN1 TRANS2
$MIX
    NSPOP=2
    P(1)=THETA(6)
    P(2)=1.-THETA(6)
$PK
;IOV
VST1=0
IF(VIST.EQ.1) VST1=1
VST2=0
IF(VIST.EQ.2) VST2=1
VST3=0
IF(VIST.EQ.3) VST3=1
EST=MIXEST
   IF (MIXNUM.EQ.1) THEN
       TVCL=THETA(1)*(WT/70)**THETA(3)
   ELSE
       TVCL=THETA(5)*(WT/70)**THETA(3)
   ENDIF

CL=TVCL*EXP(ETA(1) + ETA(3)*VST1 + ETA(4)*VST2 + ETA(5)*VST3)
TVV=THETA(2)*(WT/70)**THETA(4)
V=TVV*EXP(ETA(2))
S1=V
$ERROR
Y=F + F*ERR(1) + ERR(2)
IPRED=F
$THETA
 (0, 12) ;1. CL POP 1
 (0, 150);2. V
 (0.75)   ;3. WT ON CL
 (1)   ;4. WT ON V
 (0, 1) ;5. CL POP 2
 (0, 0.5, 1) ;6. PROB POP 1
$OMEGA
(0.04) ;1. CL VAR
(0.04) ;2. V VAR
;IOV
$OMEGA BLOCK(1)  0.04; interoccasion var in CL
$OMEGA BLOCK(1) SAME
$OMEGA BLOCK(1) SAME
$SIGMA
0.04
10
;$MSFI=./2.msf
$EST PRINT=5 MAX=9999 METHOD=1 POSTHOC NOABORT MSF=./10.msf
$TABLE NOPRINT ONEHEADER FILE=../10par.tab
ID TIME CL V EST EVID MDV VIST ETA1 ETA2 ETA3 ETA4
ETA5 IPRED
$TABLE NOPRINT ONEHEADER FILE=../10.tab
ID TIME IPRED EVID MDV

NM-TRAN MESSAGES
 WARNINGS AND ERRORS (IF ANY) FOR PROBLEM    1
 (WARNING  2) NM-TRAN INFERS THAT THE DATA ARE POPULATION.
Note: The following floating-point exceptions are signalling: IEEE_INVALID_FLAG IEEE_DIVIDE_BY_ZERO

1NONLINEAR MIXED EFFECTS MODEL PROGRAM (NONMEM) VERSION 7.3.0
 ORIGINALLY DEVELOPED BY STUART BEAL, LEWIS SHEINER, AND ALISON BOECKMANN
 CURRENT DEVELOPERS ARE ROBERT BAUER, ICON DEVELOPMENT SOLUTIONS,
 AND ALISON BOECKMANN. IMPLEMENTATION, EFFICIENCY, AND STANDARDIZATION
 PERFORMED BY NOUS INFOSYSTEMS.
 PROBLEM NO.:         1
 10 mixture model and IOV on CL
 TOT. NO. OF OBS RECS:    12600
 TOT. NO. OF INDIVIDUALS:    300
 ONE COMPARTMENT MODEL (ADVAN1)
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 #TBLN:      1
 #METH: First Order Conditional Estimation
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
 #TERM:
0MINIMIZATION SUCCESSFUL
 NO. OF FUNCTION EVALUATIONS USED:      355
 NO. OF SIG. DIGITS IN FINAL EST.:  3.0
0PARAMETER ESTIMATE IS NEAR ITS BOUNDARY
 THIS MUST BE ADDRESSED BEFORE THE COVARIANCE STEP CAN BE IMPLEMENTED

 ETABAR IS THE ARITHMETIC MEAN OF THE ETA-ESTIMATES,
 AND SE IS THE ASSOCIATED STANDARD ERROR.

 SUBMODEL    1

 ETABAR:         3.3557E-02 -2.5475E-02 -7.8995E-03  1.3250E-02  2.1335E-02
 SE:             1.1778E-02  1.2415E-02  9.9240E-03  1.0146E-02  1.0254E-02
 N:                     257         257         257         257         257

 ETAshrink(%):   1.3972E+01  4.7305E+00  1.8715E+01  1.6893E+01  1.6012E+01
 EBVshrink(%):   1.2259E+01  4.1270E+00  1.6439E+01  1.6652E+01  1.6693E+01
 EPSshrink(%):   5.7311E+00  5.7311E+00

 SUBMODEL    2

 ETABAR:        -2.4843E-02 -5.0026E-02 -2.3509E-02  2.2875E-02 -1.9122E-02
 SE:             2.6066E-02  3.0442E-02  2.4147E-02  2.2060E-02  1.9262E-02
 N:                      43          43          43          43          43

 ETAshrink(%):   2.1355E+01  3.5034E+00  1.8301E+01  2.5362E+01  3.4829E+01
 EBVshrink(%):   1.4156E+01  3.6695E+00  2.3226E+01  2.3194E+01  2.3165E+01
 EPSshrink(%):   4.9029E+00  4.9029E+00

 #TERE:
 Elapsed estimation time in seconds:   177.35

 ********************                        FIRST ORDER CONDITIONAL ESTIMATION                      ********************
 #OBJT:**************                       MINIMUM VALUE OF OBJECTIVE FUNCTION                      ********************
 #OBJV:********************************************    14722.149       **************************************************

 ********************                        FIRST ORDER CONDITIONAL ESTIMATION                      ********************
 ********************                             FINAL PARAMETER ESTIMATE                           ********************

 THETA - VECTOR OF FIXED EFFECTS PARAMETERS   *********
         TH 1      TH 2      TH 3      TH 4      TH 5      TH 6
         1.44E+01  1.01E+02  8.23E-01  1.04E+00  1.68E+00  8.57E-01

 OMEGA - COV MATRIX FOR RANDOM EFFECTS - ETAS  ********
            ETA1      ETA2      ETA3      ETA4      ETA5
 ETA1
+        4.84E-02
 ETA2
+        0.00E+00  4.38E-02
 ETA3
+        0.00E+00  0.00E+00  3.85E-02
 ETA4
+        0.00E+00  0.00E+00  0.00E+00  3.85E-02
 ETA5
+        0.00E+00  0.00E+00  0.00E+00  0.00E+00  3.85E-02

 SIGMA - COV MATRIX FOR RANDOM EFFECTS - EPSILONS  ****
            EPS1      EPS2
 EPS1
+        4.82E-02
 EPS2
+        0.00E+00  1.00E-03

 OMEGA - CORR MATRIX FOR RANDOM EFFECTS - ETAS  *******
            ETA1      ETA2      ETA3      ETA4      ETA5
 ETA1
+        2.20E-01
 ETA2
+        0.00E+00  2.09E-01
 ETA3
+        0.00E+00  0.00E+00  1.96E-01
 ETA4
+        0.00E+00  0.00E+00  0.00E+00  1.96E-01
 ETA5
+        0.00E+00  0.00E+00  0.00E+00  0.00E+00  1.96E-01

 SIGMA - CORR MATRIX FOR RANDOM EFFECTS - EPSILONS  ***
            EPS1      EPS2
 EPS1
+        2.19E-01
 EPS2
+        0.00E+00  3.16E-02
 #CPUT: Total CPU Time in Seconds,      180.042
