Thu Oct 24 15:58:48 UTC 2019
GNU Fortran (Ubuntu 6.2.0-3ubuntu11~14.04) 6.2.0 20160901
Copyright (C) 2016 Free Software Foundation, Inc.
This is free software; see the source for copying conditions.  There is NO
warranty; not even for MERCHANTABILITY or FITNESS FOR A PARTICULAR PURPOSE.

$PROB RUN# 1 PARALLEL (NONLINEAR+LINEAR) CLEARANCE MODEL
$INPUT C ID TIME AMT RATE DV EVID GRP WGTI
$DATA ../nonlinCL.csv IGNORE=C
$SUBROUTINE ADVAN6 TRANS1 TOL=8
$MODEL NPAR=10 NCOMP=2 COMP=(CENTRAL DEFOBSERVATION DEFDOSE) COMP=(PERIPH)

$PK
TVVMAX=THETA(1)*(WGTI/72)**THETA(7)
VMAX=TVVMAX*EXP(ETA(1))

KM=THETA(2)

TVCLL=THETA(3)*(WGTI/72)**THETA(8)
CLL=TVCLL*EXP(ETA(2))

TVV1=THETA(4)*(WGTI/72)**THETA(9)
V1=TVV1*EXP(ETA(3))

TVV2=THETA(5)*(WGTI/72)**THETA(10)
V2=TVV2

Q=THETA(6)

S1=V1

$DES
  C1=A(1)/V1
  C2=A(2)/V2
  DADT(1)=-VMAX*C1/(KM+C1)-(CLL*C1)-(Q*C1)+(Q*C2)
  DADT(2)=(Q*C1)-(Q*C2)

$ERROR
Y=F*EXP(EPS(1))

IPRED=F

$THETA
(0, 1.2) ;VMAX (MG/HR)
(0, 10)  ;KM (MG/L)
(0, 0.03) ;CLL (L/HR)
(0, 3)  ;V1 (L)
(0, 2)  ;V2 (L)
(0, 0.075) ;Q (L/HR)
0.8 ;WGT~VMAX
0.8 ;WGT~CLL
0.8 ;WGT~V1
0.8 ;WGT~V2

$OMEGA
0.25  ;VMAX OM
0.25  ;CLL OM
0.25  ;V1 OM

$SIGMA
0.20  ;EXPONENTIAL ERROR

;MSFI=../1.msf

$ESTIMATION METHOD=1 NOABORT MAXEVAL=9999 PRINT=10 MSFO=../1.msf
$COVARIANCE
$TABLE ID TIME EVID IPRED CWRES NOPRINT ONEHEADER FILE=../1.tab
$TABLE ID VMAX KM CLL V1 V2 Q ETA1 ETA2 ETA3 NOPRINT ONEHEADER FILE=../1par.tab

;END

NM-TRAN MESSAGES
 WARNINGS AND ERRORS (IF ANY) FOR PROBLEM    1
 (WARNING  2) NM-TRAN INFERS THAT THE DATA ARE POPULATION.
Note: The following floating-point exceptions are signalling: IEEE_INVALID_FLAG IEEE_DIVIDE_BY_ZERO

1NONLINEAR MIXED EFFECTS MODEL PROGRAM (NONMEM) VERSION 7.3.0
 ORIGINALLY DEVELOPED BY STUART BEAL, LEWIS SHEINER, AND ALISON BOECKMANN
 CURRENT DEVELOPERS ARE ROBERT BAUER, ICON DEVELOPMENT SOLUTIONS,
 AND ALISON BOECKMANN. IMPLEMENTATION, EFFICIENCY, AND STANDARDIZATION
 PERFORMED BY NOUS INFOSYSTEMS.
 PROBLEM NO.:         1
 RUN# 1 PARALLEL (NONLINEAR+LINEAR) CLEARANCE MODEL
 TOT. NO. OF OBS RECS:      792
 TOT. NO. OF INDIVIDUALS:     36
 GENERAL NONLINEAR KINETICS MODEL (ADVAN6)
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 #TBLN:      1
 #METH: First Order Conditional Estimation
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
 #TERM:
0MINIMIZATION SUCCESSFUL
 NO. OF FUNCTION EVALUATIONS USED:      510
 NO. OF SIG. DIGITS IN FINAL EST.:  3.1

 ETABAR IS THE ARITHMETIC MEAN OF THE ETA-ESTIMATES,
 AND THE P-VALUE IS GIVEN FOR THE NULL HYPOTHESIS THAT THE TRUE MEAN IS 0.

 ETABAR:         8.8306E-02  9.0771E-02 -2.2935E-02
 SE:             4.3183E-02  8.3779E-02  3.4609E-02
 N:                      36          36          36

 P VAL.:         4.0861E-02  2.7861E-01  5.0753E-01

 ETAshrink(%):   3.7469E+01  1.6432E+01  3.3072E+00
 EBVshrink(%):   3.5087E+01  1.5674E+01  3.8425E+00
 EPSshrink(%):   4.7624E+00

 #TERE:
 Elapsed estimation time in seconds:    52.23
 Elapsed covariance time in seconds:    86.61

 ********************                        FIRST ORDER CONDITIONAL ESTIMATION                      ********************
 #OBJT:**************                       MINIMUM VALUE OF OBJECTIVE FUNCTION                      ********************
 #OBJV:********************************************     4259.607       **************************************************

 ********************                        FIRST ORDER CONDITIONAL ESTIMATION                      ********************
 ********************                             FINAL PARAMETER ESTIMATE                           ********************

 THETA - VECTOR OF FIXED EFFECTS PARAMETERS   *********
         TH 1      TH 2      TH 3      TH 4      TH 5      TH 6      TH 7      TH 8      TH 9      TH10
         5.37E-01  4.22E+00  1.48E-02  4.04E+00  2.77E+00  1.18E-01  1.13E+00  6.22E-01  4.45E-01  3.05E-01

 OMEGA - COV MATRIX FOR RANDOM EFFECTS - ETAS  ********
            ETA1      ETA2      ETA3
 ETA1
+        1.77E-01
 ETA2
+        0.00E+00  3.72E-01
 ETA3
+        0.00E+00  0.00E+00  4.74E-02

 SIGMA - COV MATRIX FOR RANDOM EFFECTS - EPSILONS  ****
            EPS1
 EPS1
+        2.18E-02

 OMEGA - CORR MATRIX FOR RANDOM EFFECTS - ETAS  *******
            ETA1      ETA2      ETA3
 ETA1
+        4.20E-01
 ETA2
+        0.00E+00  6.10E-01
 ETA3
+        0.00E+00  0.00E+00  2.18E-01

 SIGMA - CORR MATRIX FOR RANDOM EFFECTS - EPSILONS  ***
            EPS1
 EPS1
+        1.48E-01

 ********************                        FIRST ORDER CONDITIONAL ESTIMATION                      ********************
 ********************                            STANDARD ERROR OF ESTIMATE                          ********************

 THETA - VECTOR OF FIXED EFFECTS PARAMETERS   *********
         TH 1      TH 2      TH 3      TH 4      TH 5      TH 6      TH 7      TH 8      TH 9      TH10
         1.76E-01  2.54E+00  4.34E-03  2.02E-01  2.12E-01  1.04E-02  1.33E+00  1.61E+00  2.88E-01  2.77E-01

 OMEGA - COV MATRIX FOR RANDOM EFFECTS - ETAS  ********
            ETA1      ETA2      ETA3
 ETA1
+        9.43E-02
 ETA2
+       .........  1.43E-01
 ETA3
+       ......... .........  8.99E-03

 SIGMA - COV MATRIX FOR RANDOM EFFECTS - EPSILONS  ****
            EPS1
 EPS1
+        1.42E-03

 OMEGA - CORR MATRIX FOR RANDOM EFFECTS - ETAS  *******
            ETA1      ETA2      ETA3
 ETA1
+        1.12E-01
 ETA2
+       .........  1.17E-01
 ETA3
+       ......... .........  2.06E-02

 SIGMA - CORR MATRIX FOR RANDOM EFFECTS - EPSILONS  ***
            EPS1
 EPS1
+        4.81E-03
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 #CPUT: Total CPU Time in Seconds,      138.429
