Fri Oct 25 12:03:14 UTC 2019
GNU Fortran (Ubuntu 6.2.0-3ubuntu11~14.04) 6.2.0 20160901
Copyright (C) 2016 Free Software Foundation, Inc.
This is free software; see the source for copying conditions.  There is NO
warranty; not even for MERCHANTABILITY or FITNESS FOR A PARTICULAR PURPOSE.

$PROB RUN# 1 DIRECT POPULATION PKPD MODEL
$INPUT C ID AMT TIME DV TYPE DROP
;TYPE 0 = PK, TYPE 1=PD
;DV=PK & PD DATA ORDERED BY ID, TIME
$DATA ../pkpd.csv IGNORE=C ;combined data set
$SUBROUTINE ADVAN2 TRANS2

$PK
 KA=THETA(1)*EXP(ETA(1))
 CL=THETA(2)*EXP(ETA(2))
 V=THETA(3)*EXP(ETA(3))
 S2=V
$ERROR
EMAX=THETA(4)*EXP(ETA(4))
EC50=THETA(5)*EXP(ETA(5))
E0=THETA(6)*EXP(ETA(6))
EFF=E0+EMAX*F/(EC50+F)+ERR(2)
CONC=F + F*ERR(1)
Y=EFF*TYPE + CONC*(1-TYPE)
TYP2=TYPE
IPRED=Y

$THETA
(0, 1.7)     ;KA
(0, 4.7)     ;CL
(0, 38)     ;V
(0, 100) ;EMAX
(0,5)  ;EC50
(0, 60) ;E0
$OMEGA
0.04
0.04
0.04
0.04
0.04
0.04

$SIGMA
0.04
5
$ESTIMATION MAXEVAL=9999 METHOD=1 POSTHOC MSFO=./1.msf
$COV
$TABLE NOPRINT FILE=./1.tab ONEHEADER
ID TIME TYPE EVID EFF CONC IPRED TYP2

NM-TRAN MESSAGES
 WARNINGS AND ERRORS (IF ANY) FOR PROBLEM    1
 (WARNING  2) NM-TRAN INFERS THAT THE DATA ARE POPULATION.
Note: The following floating-point exceptions are signalling: IEEE_INVALID_FLAG IEEE_DIVIDE_BY_ZERO

1NONLINEAR MIXED EFFECTS MODEL PROGRAM (NONMEM) VERSION 7.3.0
 ORIGINALLY DEVELOPED BY STUART BEAL, LEWIS SHEINER, AND ALISON BOECKMANN
 CURRENT DEVELOPERS ARE ROBERT BAUER, ICON DEVELOPMENT SOLUTIONS,
 AND ALISON BOECKMANN. IMPLEMENTATION, EFFICIENCY, AND STANDARDIZATION
 PERFORMED BY NOUS INFOSYSTEMS.
 PROBLEM NO.:         1
 RUN# 1 DIRECT POPULATION PKPD MODEL
 TOT. NO. OF OBS RECS:      440
 TOT. NO. OF INDIVIDUALS:     20
 ONE COMPARTMENT MODEL WITH FIRST-ORDER ABSORPTION (ADVAN2)
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 #TBLN:      1
 #METH: First Order Conditional Estimation
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
 #TERM:
0MINIMIZATION SUCCESSFUL
 NO. OF FUNCTION EVALUATIONS USED:      748
 NO. OF SIG. DIGITS IN FINAL EST.:  3.5
0PARAMETER ESTIMATE IS NEAR ITS BOUNDARY
 THIS MUST BE ADDRESSED BEFORE THE COVARIANCE STEP CAN BE IMPLEMENTED

 ETABAR IS THE ARITHMETIC MEAN OF THE ETA-ESTIMATES,
 AND THE P-VALUE IS GIVEN FOR THE NULL HYPOTHESIS THAT THE TRUE MEAN IS 0.

 ETABAR:         3.2982E-02 -1.1460E-02 -9.9843E-04  4.2800E-07 -5.3785E-01  3.5087E-04
 SE:             3.9905E-02  4.2505E-02  2.6352E-02  1.7809E-07  5.3226E-01  3.6699E-02
 N:                      20          20          20          20          20          20

 P VAL.:         4.0851E-01  7.8745E-01  9.6978E-01  1.6248E-02  3.1225E-01  9.9237E-01

 ETAshrink(%):   2.3629E+01  3.8217E+00  1.3712E+01  9.9959E+01  7.0640E+01  5.5129E+00
 EBVshrink(%):   2.4256E+01  4.7188E+00  1.5345E+01  9.9951E+01  5.8526E+01  8.2814E+00
 EPSshrink(%):   1.0361E+01  4.3454E+00

 #TERE:
 Elapsed estimation time in seconds:     6.02

 ********************                        FIRST ORDER CONDITIONAL ESTIMATION                      ********************
 #OBJT:**************                       MINIMUM VALUE OF OBJECTIVE FUNCTION                      ********************
 #OBJV:********************************************     1677.484       **************************************************

 ********************                        FIRST ORDER CONDITIONAL ESTIMATION                      ********************
 ********************                             FINAL PARAMETER ESTIMATE                           ********************

 THETA - VECTOR OF FIXED EFFECTS PARAMETERS   *********
         TH 1      TH 2      TH 3      TH 4      TH 5      TH 6
         1.33E+00  4.73E+00  3.54E+01  4.32E+00  4.61E+00  7.82E+01

 OMEGA - COV MATRIX FOR RANDOM EFFECTS - ETAS  ********
            ETA1      ETA2      ETA3      ETA4      ETA5      ETA6
 ETA1
+        5.75E-02
 ETA2
+        0.00E+00  4.11E-02
 ETA3
+        0.00E+00  0.00E+00  1.96E-02
 ETA4
+        0.00E+00  0.00E+00  0.00E+00  4.00E-06
 ETA5
+        0.00E+00  0.00E+00  0.00E+00  0.00E+00  6.92E+01
 ETA6
+        0.00E+00  0.00E+00  0.00E+00  0.00E+00  0.00E+00  3.18E-02

 SIGMA - COV MATRIX FOR RANDOM EFFECTS - EPSILONS  ****
            EPS1      EPS2
 EPS1
+        4.61E-02
 EPS2
+        0.00E+00  2.68E+02

 OMEGA - CORR MATRIX FOR RANDOM EFFECTS - ETAS  *******
            ETA1      ETA2      ETA3      ETA4      ETA5      ETA6
 ETA1
+        2.40E-01
 ETA2
+        0.00E+00  2.03E-01
 ETA3
+        0.00E+00  0.00E+00  1.40E-01
 ETA4
+        0.00E+00  0.00E+00  0.00E+00  2.00E-03
 ETA5
+        0.00E+00  0.00E+00  0.00E+00  0.00E+00  8.32E+00
 ETA6
+        0.00E+00  0.00E+00  0.00E+00  0.00E+00  0.00E+00  1.78E-01

 SIGMA - CORR MATRIX FOR RANDOM EFFECTS - EPSILONS  ***
            EPS1      EPS2
 EPS1
+        2.15E-01
 EPS2
+        0.00E+00  1.64E+01
 #CPUT: Total CPU Time in Seconds,        6.078
