Sun Oct 20 15:31:21 EDT 2019

$PROBLEM "generated by MDL2PharmML v.6.0"

$INPUT  ID TIME=TIME GROUP=DROP DV MDV EVID AMT RATE AGE WT CLCR
$DATA ../Simulated_DatasetMeropenem.csv IGNORE=@
$SUBS ADVAN13 TOL=9

$MODEL
COMP (COMP1) 	;CENTRAL
COMP (COMP2) 	;PERIPHERAL

$PK
POP_CL = THETA(1)
POP_V1 = THETA(2)
POP_Q = THETA(3)
POP_V2 = THETA(4)
COV_CL_AGE = THETA(5)
COV_V1_WT = THETA(6)
RUV_PROP = THETA(7)
RUV_ADD = THETA(8)
COV_CL_CLCR = THETA(9)

ETA_CL =  ETA(1)
ETA_V1 =  ETA(2)
ETA_Q =  ETA(3)
ETA_V2 =  ETA(4)

LOGTWT = LOG((WT/70))

LOGTAGE = LOG((AGE/35))

LOGTCLCR = LOG((CLCR/83))

MU_1 = LOG(POP_CL) + COV_CL_AGE * LOGTAGE + COV_CL_CLCR * LOGTCLCR
CL =  EXP(MU_1 +  ETA(1)) ;

MU_2 = LOG(POP_V1) + COV_V1_WT * LOGTWT
V1 =  EXP(MU_2 +  ETA(2)) ;

MU_3 = LOG(POP_Q)
Q =  EXP(MU_3 +  ETA(3)) ;

MU_4 = LOG(POP_V2)
V2 =  EXP(MU_4 +  ETA(4)) ;

A_0(1) = 0
A_0(2) = 0

$DES
CENTRAL_DES = A(1)
PERIPHERAL_DES = A(2)
CC_DES = (CENTRAL_DES/V1)
DADT(1) = ((((-(Q)*CENTRAL_DES)/V1)+((Q*PERIPHERAL_DES)/V2))-((CL*CENTRAL_DES)/V1))
DADT(2) = (((Q*CENTRAL_DES)/V1)-((Q*PERIPHERAL_DES)/V2))

$ERROR
CENTRAL = A(1)
PERIPHERAL = A(2)
CC = (CENTRAL/V1)
IPRED = CC
W = SQRT((RUV_ADD*RUV_ADD)+ (RUV_PROP*RUV_PROP*IPRED*IPRED))
Y = IPRED+W*EPS(1)
IRES = DV - IPRED
IWRES = IRES/W

$THETA
( 0.0 , 14.6 )	;POP_CL
( 0.0 , 10.8 )	;POP_V1
( 0.0 , 18.6 )	;POP_Q
( 0.0 , 12.6 )	;POP_V2
(-0.34 )	;COV_CL_AGE
(0.99 )	;COV_V1_WT
(0.19 )	;RUV_PROP
(0.47 )	;RUV_ADD
(0.62  FIX )	;COV_CL_CLCR

$OMEGA
(0.118 )	;PPV_CL
(0.143 )	;PPV_V1
(0.29 )	;PPV_Q
(0.102 )	;PPV_V2

$SIGMA
1.0 FIX

$EST METHOD=COND INTER NSIG=3 SIGL=9 MAXEVALS=9999 PRINT=10 NOABORT

$COV

$TABLE  ID TIME MDV EVID AMT RATE AGE WT CLCR PRED IPRED RES IRES WRES IWRES Y DV NOAPPEND NOPRINT FILE=sdtab

$TABLE  ID CL V1 Q V2 ETA_CL ETA_V1 ETA_Q ETA_V2 NOAPPEND NOPRINT FILE=patab

$TABLE  ID AGE WT CLCR LOGTWT LOGTAGE LOGTCLCR NOAPPEND NOPRINT FILE=cotab

NM-TRAN MESSAGES
 WARNINGS AND ERRORS (IF ANY) FOR PROBLEM    1
 (WARNING  2) NM-TRAN INFERS THAT THE DATA ARE POPULATION.
 (MU_WARNING 26) DATA ITEM(S) USED IN DEFINITION OF MU_(S) SHOULD BE CONSTANT FOR INDIV. REC.:
  AGE CLCR WT

1NONLINEAR MIXED EFFECTS MODEL PROGRAM (NONMEM) VERSION 7.4.3
 ORIGINALLY DEVELOPED BY STUART BEAL, LEWIS SHEINER, AND ALISON BOECKMANN
 CURRENT DEVELOPERS ARE ROBERT BAUER, ICON DEVELOPMENT SOLUTIONS,
 AND ALISON BOECKMANN. IMPLEMENTATION, EFFICIENCY, AND STANDARDIZATION
 PERFORMED BY NOUS INFOSYSTEMS.
 PROBLEM NO.:         1
 "generated by MDL2PharmML v.6.0"
 TOT. NO. OF OBS RECS:      632
 TOT. NO. OF INDIVIDUALS:       79
 GENERAL NONLINEAR KINETICS MODEL WITH STIFF/NONSTIFF EQUATIONS (LSODA, ADVAN13)
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 #TBLN:      1
 #METH: First Order Conditional Estimation with Interaction
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
 #TERM:
0MINIMIZATION SUCCESSFUL
 NO. OF FUNCTION EVALUATIONS USED:      359
 NO. OF SIG. DIGITS IN FINAL EST.:  3.6

 ETABAR IS THE ARITHMETIC MEAN OF THE ETA-ESTIMATES,
 AND THE P-VALUE IS GIVEN FOR THE NULL HYPOTHESIS THAT THE TRUE MEAN IS 0.

 ETABAR:        -3.6703E-03 -3.9146E-03 -8.0065E-03 -1.9573E-03
 SE:             3.1972E-02  2.6095E-02  1.6279E-02  1.9000E-02
 N:                      79          79          79          79

 P VAL.:         9.0861E-01  8.8075E-01  6.2283E-01  9.1795E-01

 ETASHRINKSD(%)  3.8250E+00  2.5293E+01  5.4636E+01  3.6911E+01
 ETASHRINKVR(%)  7.5037E+00  4.4189E+01  7.9421E+01  6.0198E+01
 EBVSHRINKSD(%)  3.7980E+00  2.5653E+01  5.4562E+01  3.7112E+01
 EBVSHRINKVR(%)  7.4517E+00  4.4726E+01  7.9354E+01  6.0450E+01
 EPSSHRINKSD(%)  1.3269E+01
 EPSSHRINKVR(%)  2.4778E+01


 TOTAL DATA POINTS NORMALLY DISTRIBUTED (N):          632
 N*LOG(2PI) CONSTANT TO OBJECTIVE FUNCTION:    1161.5383059707062
 OBJECTIVE FUNCTION VALUE WITHOUT CONSTANT:    1425.5218436815924
 OBJECTIVE FUNCTION VALUE WITH CONSTANT:       2587.0601496522986
 REPORTED OBJECTIVE FUNCTION DOES NOT CONTAIN CONSTANT

 TOTAL EFFECTIVE ETAS (NIND*NETA):                           316


 #TERE:
 Elapsed estimation  time in seconds:    58.11
 Elapsed covariance  time in seconds:    60.50
 Elapsed postprocess time in seconds:     0.38

 ********************               FIRST ORDER CONDITIONAL ESTIMATION WITH INTERACTION              ********************
 #OBJT:**************                       MINIMUM VALUE OF OBJECTIVE FUNCTION                      ********************
 #OBJV:********************************************     1425.522       **************************************************

 ********************               FIRST ORDER CONDITIONAL ESTIMATION WITH INTERACTION              ********************
 ********************                             FINAL PARAMETER ESTIMATE                           ********************

 THETA - VECTOR OF FIXED EFFECTS PARAMETERS   *********
         TH 1      TH 2      TH 3      TH 4      TH 5      TH 6      TH 7      TH 8      TH 9
         1.50E+01  1.27E+01  1.52E+01  1.24E+01 -4.47E-01  8.20E-01  1.88E-01  4.76E-01  6.20E-01

 OMEGA - COV MATRIX FOR RANDOM EFFECTS - ETAS  ********
         ETA1      ETA2      ETA3      ETA4
 ETA1
+        8.84E-02
 ETA2
+        0.00E+00  9.76E-02
 ETA3
+        0.00E+00  0.00E+00  1.03E-01
 ETA4
+        0.00E+00  0.00E+00  0.00E+00  7.26E-02

 SIGMA - COV MATRIX FOR RANDOM EFFECTS - EPSILONS  ****
         EPS1
 EPS1
+        1.00E+00

 OMEGA - CORR MATRIX FOR RANDOM EFFECTS - ETAS  *******
         ETA1      ETA2      ETA3      ETA4
 ETA1
+        2.97E-01
 ETA2
+        0.00E+00  3.12E-01
 ETA3
+        0.00E+00  0.00E+00  3.21E-01
 ETA4
+        0.00E+00  0.00E+00  0.00E+00  2.69E-01

 SIGMA - CORR MATRIX FOR RANDOM EFFECTS - EPSILONS  ***
         EPS1
 EPS1
+        1.00E+00

 ********************               FIRST ORDER CONDITIONAL ESTIMATION WITH INTERACTION              ********************
 ********************                            STANDARD ERROR OF ESTIMATE                          ********************

 THETA - VECTOR OF FIXED EFFECTS PARAMETERS   *********
         TH 1      TH 2      TH 3      TH 4      TH 5      TH 6      TH 7      TH 8      TH 9
         5.33E-01  8.99E-01  1.89E+00  7.54E-01  9.08E-02  2.45E-01  9.93E-03  3.34E-02 .........

 OMEGA - COV MATRIX FOR RANDOM EFFECTS - ETAS  ********
         ETA1      ETA2      ETA3      ETA4
 ETA1
+        1.82E-02
 ETA2
+       .........  3.00E-02
 ETA3
+       ......... .........  7.83E-02
 ETA4
+       ......... ......... .........  3.35E-02

 SIGMA - COV MATRIX FOR RANDOM EFFECTS - EPSILONS  ****
         EPS1
 EPS1
+       .........

 OMEGA - CORR MATRIX FOR RANDOM EFFECTS - ETAS  *******
         ETA1      ETA2      ETA3      ETA4
 ETA1
+        3.06E-02
 ETA2
+       .........  4.80E-02
 ETA3
+       ......... .........  1.22E-01
 ETA4
+       ......... ......... .........  6.22E-02

 SIGMA - CORR MATRIX FOR RANDOM EFFECTS - EPSILONS  ***
         EPS1
 EPS1
+       .........
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 Elapsed finaloutput time in seconds:     0.05
 #CPUT: Total CPU Time in Seconds,      119.382
