Wed Oct  9 10:59:57 EDT 2019
$PROB RUN# 1 PARALLEL (NONLINEAR+LINEAR) CLEARANCE MODEL
$INPUT C ID TIME AMT RATE DV EVID GRP WGTI
$DATA ../nonlinCL.csv IGNORE=C
$SUBROUTINE ADVAN6 TRANS1 TOL=8
$MODEL NPAR=10 NCOMP=2 COMP=(CENTRAL DEFOBSERVATION DEFDOSE) COMP=(PERIPH)

$PK
TVVMAX=THETA(1)*(WGTI/72)**THETA(7)
VMAX=TVVMAX*EXP(ETA(1))

KM=THETA(2)

TVCLL=THETA(3)*(WGTI/72)**THETA(8)
CLL=TVCLL*EXP(ETA(2))

TVV1=THETA(4)*(WGTI/72)**THETA(9)
V1=TVV1*EXP(ETA(3))

TVV2=THETA(5)*(WGTI/72)**THETA(10)
V2=TVV2

Q=THETA(6)

S1=V1

$DES
  C1=A(1)/V1
  C2=A(2)/V2
  DADT(1)=-VMAX*C1/(KM+C1)-(CLL*C1)-(Q*C1)+(Q*C2)
  DADT(2)=(Q*C1)-(Q*C2)

$ERROR
Y=F*EXP(EPS(1))

IPRED=F

$THETA
(0, 1.2) ;VMAX (MG/HR)
(0, 10)  ;KM (MG/L)
(0, 0.03) ;CLL (L/HR)
(0, 3)  ;V1 (L)
(0, 2)  ;V2 (L)
(0, 0.075) ;Q (L/HR)
0.8 ;WGT~VMAX
0.8 ;WGT~CLL
0.8 ;WGT~V1
0.8 ;WGT~V2

$OMEGA
0.25  ;VMAX OM
0.25  ;CLL OM
0.25  ;V1 OM

$SIGMA
0.20  ;EXPONENTIAL ERROR

;MSFI=../1.msf

$ESTIMATION METHOD=1 NOABORT MAXEVAL=9999 PRINT=10 MSFO=../1.msf
$COVARIANCE
$TABLE ID TIME EVID IPRED CWRES NOPRINT ONEHEADER FILE=../1.tab
$TABLE ID VMAX KM CLL V1 V2 Q ETA1 ETA2 ETA3 NOPRINT ONEHEADER FILE=../1par.tab

;END

NM-TRAN MESSAGES
 WARNINGS AND ERRORS (IF ANY) FOR PROBLEM    1
 (WARNING  2) NM-TRAN INFERS THAT THE DATA ARE POPULATION.

1NONLINEAR MIXED EFFECTS MODEL PROGRAM (NONMEM) VERSION 7.4.3
 ORIGINALLY DEVELOPED BY STUART BEAL, LEWIS SHEINER, AND ALISON BOECKMANN
 CURRENT DEVELOPERS ARE ROBERT BAUER, ICON DEVELOPMENT SOLUTIONS,
 AND ALISON BOECKMANN. IMPLEMENTATION, EFFICIENCY, AND STANDARDIZATION
 PERFORMED BY NOUS INFOSYSTEMS.
 PROBLEM NO.:         1
 RUN# 1 PARALLEL (NONLINEAR+LINEAR) CLEARANCE MODEL
 TOT. NO. OF OBS RECS:      792
 TOT. NO. OF INDIVIDUALS:       36
 GENERAL NONLINEAR KINETICS MODEL (DVERK1, ADVAN6)
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 #TBLN:      1
 #METH: First Order Conditional Estimation
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
 #TERM:
0MINIMIZATION SUCCESSFUL
 NO. OF FUNCTION EVALUATIONS USED:      664
 NO. OF SIG. DIGITS IN FINAL EST.:  3.2

 ETABAR IS THE ARITHMETIC MEAN OF THE ETA-ESTIMATES,
 AND THE P-VALUE IS GIVEN FOR THE NULL HYPOTHESIS THAT THE TRUE MEAN IS 0.

 ETABAR:         8.8304E-02  9.0817E-02 -2.2925E-02
 SE:             4.3182E-02  8.3783E-02  3.4609E-02
 N:                      36          36          36

 P VAL.:         4.0865E-02  2.7839E-01  5.0772E-01

 ETASHRINKSD(%)  3.7468E+01  1.6435E+01  3.3027E+00
 ETASHRINKVR(%)  6.0898E+01  3.0170E+01  6.4964E+00
 EBVSHRINKSD(%)  3.5090E+01  1.5671E+01  3.8428E+00
 EBVSHRINKVR(%)  5.7867E+01  2.8886E+01  7.5379E+00
 EPSSHRINKSD(%)  4.7622E+00
 EPSSHRINKVR(%)  9.2977E+00


 TOTAL DATA POINTS NORMALLY DISTRIBUTED (N):          792
 N*LOG(2PI) CONSTANT TO OBJECTIVE FUNCTION:    1455.5986365962015
 OBJECTIVE FUNCTION VALUE WITHOUT CONSTANT:    4259.6065288675936
 OBJECTIVE FUNCTION VALUE WITH CONSTANT:       5715.2051654637953
 REPORTED OBJECTIVE FUNCTION DOES NOT CONTAIN CONSTANT

 TOTAL EFFECTIVE ETAS (NIND*NETA):                           108


 #TERE:
 Elapsed estimation  time in seconds:    47.09
 Elapsed covariance  time in seconds:    45.25
 Elapsed postprocess time in seconds:     0.19

 ********************                        FIRST ORDER CONDITIONAL ESTIMATION                      ********************
 #OBJT:**************                       MINIMUM VALUE OF OBJECTIVE FUNCTION                      ********************
 #OBJV:********************************************     4259.607       **************************************************

 ********************                        FIRST ORDER CONDITIONAL ESTIMATION                      ********************
 ********************                             FINAL PARAMETER ESTIMATE                           ********************

 THETA - VECTOR OF FIXED EFFECTS PARAMETERS   *********
         TH 1      TH 2      TH 3      TH 4      TH 5      TH 6      TH 7      TH 8      TH 9      TH10
         5.37E-01  4.22E+00  1.48E-02  4.04E+00  2.77E+00  1.18E-01  1.13E+00  6.23E-01  4.45E-01  3.05E-01

 OMEGA - COV MATRIX FOR RANDOM EFFECTS - ETAS  ********
         ETA1      ETA2      ETA3
 ETA1
+        1.77E-01
 ETA2
+        0.00E+00  3.72E-01
 ETA3
+        0.00E+00  0.00E+00  4.74E-02

 SIGMA - COV MATRIX FOR RANDOM EFFECTS - EPSILONS  ****
         EPS1
 EPS1
+        2.18E-02

 OMEGA - CORR MATRIX FOR RANDOM EFFECTS - ETAS  *******
         ETA1      ETA2      ETA3
 ETA1
+        4.20E-01
 ETA2
+        0.00E+00  6.10E-01
 ETA3
+        0.00E+00  0.00E+00  2.18E-01

 SIGMA - CORR MATRIX FOR RANDOM EFFECTS - EPSILONS  ***
         EPS1
 EPS1
+        1.48E-01

 ********************                        FIRST ORDER CONDITIONAL ESTIMATION                      ********************
 ********************                            STANDARD ERROR OF ESTIMATE                          ********************

 THETA - VECTOR OF FIXED EFFECTS PARAMETERS   *********
         TH 1      TH 2      TH 3      TH 4      TH 5      TH 6      TH 7      TH 8      TH 9      TH10
         1.75E-01  2.53E+00  4.32E-03  2.01E-01  2.11E-01  1.04E-02  1.31E+00  1.59E+00  2.88E-01  2.73E-01

 OMEGA - COV MATRIX FOR RANDOM EFFECTS - ETAS  ********
         ETA1      ETA2      ETA3
 ETA1
+        9.43E-02
 ETA2
+       .........  1.43E-01
 ETA3
+       ......... .........  8.99E-03

 SIGMA - COV MATRIX FOR RANDOM EFFECTS - EPSILONS  ****
         EPS1
 EPS1
+        1.41E-03

 OMEGA - CORR MATRIX FOR RANDOM EFFECTS - ETAS  *******
         ETA1      ETA2      ETA3
 ETA1
+        1.12E-01
 ETA2
+       .........  1.17E-01
 ETA3
+       ......... .........  2.06E-02

 SIGMA - CORR MATRIX FOR RANDOM EFFECTS - EPSILONS  ***
         EPS1
 EPS1
+        4.79E-03
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 Elapsed finaloutput time in seconds:     0.05
 #CPUT: Total CPU Time in Seconds,       92.690
