Mon Oct 14 14:13:45 EDT 2019
$PROB RUN# 1 FULL TMDD MODEL EXAMPLE
$INPUT C ID AMT TIME DV EVID CMT L2
;DV is in molar concentration (pM)
;AMT is in molar amount (pmoles)
$DATA ../TMDD.csv IGNORE=C

$SUBROUTINE ADVAN6 TRANS1 TOL=4

$MODEL
 COMP(Central,DEFDOSE,DEFOBS)
 COMP(Target)
 COMP(Complex)
 COMP(Periph)

$PK
CL  = THETA(1)*EXP(ETA(1)) ;clearance (L/hr)
VC  = THETA(2)*EXP(ETA(2)) ;central volume for free drug (L)
;assume VC is also the same for free target and drug-target complex
Q   = THETA(3)  ;intercompartmental clearance (L/hr)
VP  = THETA(4)  ;peripheral volume for free drug (L)

K   = CL/VC   ;elimination rate constant for free drug (hr-1)
K12 = Q/VC    ;central->peripheral rate constant for free drug (hr-1)
K21 = Q/VP    ;peripheral->central rate constant for free drug (hr-1)

BASE = THETA(5)*EXP(ETA(3))  ;baseline concentration of free target (pM)
KINT = THETA(6)  ;elimination rate constant for drug-target complex (hr-1)
KDEG = THETA(7)  ;elimination rate constant for free target (hr-1)
KON  = THETA(8)  ;binding rate constant (pM-1 hr-1)
KOFF = THETA(9)  ;dissociation rate constant (hr-1)

KSYN = BASE*KDEG ;synthesis rate constant for free target (pM/hr)
A_0(2)  = BASE   ;initialization of free target compartment by conc (pM)

$DES
DADT(1) = -K*A(1)-KON*A(2)*A(1) + KOFF*A(3)*VC-K12*A(1)+K21*A(4)    ;Free drug AMOUNT (pmoles) central comp
DADT(2) = KSYN - KDEG*A(2) - KON*A(2)*A(1)/VC + KOFF*A(3)  ;Free target CONCENTRATION (pM)
DADT(3) = KON*A(2)*A(1)/VC-(KOFF+KINT)*A(3)                ;Drug-Target complex CONCENTRATION (pM)
DADT(4) = K12*A(1)-K21*A(4)                                ;Free drug AMOUNT (pmoles) peripheral comp

$ERROR
CALLFL=0

FDRUG=A(1)/VC ;free drug concentration (pM)
FTARG=A(2)    ;free target concentration (pM)
FCOMP=A(3)    ;complex concentration (pM)

IF(CMT.EQ.1) IPRED = FDRUG
IF(CMT.EQ.2) IPRED = FTARG
IF(CMT.EQ.3) IPRED = FCOMP

IF(CMT.EQ.1) Y=IPRED*(1+ERR(1))
IF(CMT.EQ.2) Y=IPRED*(1+ERR(2))
IF(CMT.EQ.3) Y=IPRED*(1+ERR(3))

$THETA
(0, 0.2)    ; 1 CL (L/hr)
(0, 2.0)    ; 2 VC (L)
(0, 0.1)    ; 3 Q (L/hr)
(0, 2.0)    ; 4 VP (L)
(0, 60)     ; 5 BASE (pM)
(0, 1.5)     ; 6 KINT (hr-1)
(0, 0.07)    ; 7 KDEG (hr-1)
0.15 FIX    ; 8 KON  (pM-1 hr-1)
10.5 FIX   ; 9 KOFF (hr-1)

$OMEGA BLOCK (2)
0.06          ;CL BSV
0.01 0.06   ;VC BSV

$OMEGA 0.06   ;BASE BSV

$SIGMA BLOCK (3)
0.02   ;PROP FREE DRUG
0.006 0.02   ;PROP FREE TARGET
0.006 0.006 0.02   ;PROP DRUG-TARGET COMPLEX

;MSFI=../1.msf

$ESTIMATION METHOD=1 NOABORT MAXEVAL=9999 PRINT=10 MSFO=../1.msf
$COVARIANCE
$TABLE ID TIME EVID IPRED CWRES CMT NOPRINT ONEHEADER FILE=../1.tab
$TABLE ID CL VC Q VP K K12 K21 BASE KINT KDEG KON KOFF KSYN ETA1
ETA2 ETA3 NOPRINT ONEHEADER FILE=../1par.tab

;END

NM-TRAN MESSAGES
 WARNINGS AND ERRORS (IF ANY) FOR PROBLEM    1
 (WARNING  2) NM-TRAN INFERS THAT THE DATA ARE POPULATION.
 (WARNING  3) THERE MAY BE AN ERROR IN THE ABBREVIATED CODE. THE FOLLOWING
 ONE OR MORE RANDOM VARIABLES ARE DEFINED WITH "IF" STATEMENTS THAT DO NOT
 PROVIDE DEFINITIONS FOR BOTH THE "THEN" AND "ELSE" CASES. IF ALL
 CONDITIONS FAIL, THE VALUES OF THESE VARIABLES WILL BE ZERO.
   IPRED Y

1NONLINEAR MIXED EFFECTS MODEL PROGRAM (NONMEM) VERSION 7.4.3
 ORIGINALLY DEVELOPED BY STUART BEAL, LEWIS SHEINER, AND ALISON BOECKMANN
 CURRENT DEVELOPERS ARE ROBERT BAUER, ICON DEVELOPMENT SOLUTIONS,
 AND ALISON BOECKMANN. IMPLEMENTATION, EFFICIENCY, AND STANDARDIZATION
 PERFORMED BY NOUS INFOSYSTEMS.
 PROBLEM NO.:         1
 RUN# 1 FULL TMDD MODEL EXAMPLE
 TOT. NO. OF OBS RECS:      810
 TOT. NO. OF INDIVIDUALS:       15
 GENERAL NONLINEAR KINETICS MODEL (DVERK1, ADVAN6)
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 #TBLN:      1
 #METH: First Order Conditional Estimation
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
 #TERM:
0MINIMIZATION SUCCESSFUL
 NO. OF FUNCTION EVALUATIONS USED:      917
 NO. OF SIG. DIGITS IN FINAL EST.:  3.5

 ETABAR IS THE ARITHMETIC MEAN OF THE ETA-ESTIMATES,
 AND THE P-VALUE IS GIVEN FOR THE NULL HYPOTHESIS THAT THE TRUE MEAN IS 0.

 ETABAR:        -6.8808E-02  4.0823E-02  1.1001E-01
 SE:             5.2041E-02  5.2946E-02  4.9307E-02
 N:                      15          15          15

 P VAL.:         1.8610E-01  4.4068E-01  2.5671E-02

 ETASHRINKSD(%)  5.0168E+00  7.6145E-01  1.0923E+01
 ETASHRINKVR(%)  9.7819E+00  1.5171E+00  2.0653E+01
 EBVSHRINKSD(%)  3.2923E+00  2.0776E+00  1.0487E+00
 EBVSHRINKVR(%)  6.4761E+00  4.1121E+00  2.0864E+00
 EPSSHRINKSD(%)  2.6835E+00  2.6835E+00  2.6835E+00
 EPSSHRINKVR(%)  5.2950E+00  5.2950E+00  5.2950E+00


 TOTAL DATA POINTS NORMALLY DISTRIBUTED (N):          810
 N*LOG(2PI) CONSTANT TO OBJECTIVE FUNCTION:    1488.6804237915696
 OBJECTIVE FUNCTION VALUE WITHOUT CONSTANT:    1401.6706572618405
 OBJECTIVE FUNCTION VALUE WITH CONSTANT:       2890.3510810534099
 REPORTED OBJECTIVE FUNCTION DOES NOT CONTAIN CONSTANT

 TOTAL EFFECTIVE ETAS (NIND*NETA):                            45


 #TERE:
 Elapsed estimation  time in seconds:   605.28
0S MATRIX ALGORITHMICALLY SINGULAR
0S MATRIX IS OUTPUT
0INVERSE COVARIANCE MATRIX SET TO RS*RMAT, WHERE S* IS A PSEUDO INVERSE OF S
 Elapsed covariance  time in seconds:   693.78
 Elapsed postprocess time in seconds:     1.67

 ********************                        FIRST ORDER CONDITIONAL ESTIMATION                      ********************
 #OBJT:**************                       MINIMUM VALUE OF OBJECTIVE FUNCTION                      ********************
 #OBJV:********************************************     1401.671       **************************************************

 ********************                        FIRST ORDER CONDITIONAL ESTIMATION                      ********************
 ********************                             FINAL PARAMETER ESTIMATE                           ********************

 THETA - VECTOR OF FIXED EFFECTS PARAMETERS   *********
         TH 1      TH 2      TH 3      TH 4      TH 5      TH 6      TH 7      TH 8      TH 9
         2.68E-01  2.17E+00  1.44E-01  1.19E+00  5.57E+01  1.96E+00  8.00E-02  1.50E-01  1.05E+01

 OMEGA - COV MATRIX FOR RANDOM EFFECTS - ETAS  ********
         ETA1      ETA2      ETA3
 ETA1
+        4.82E-02
 ETA2
+       -2.05E-02  4.57E-02
 ETA3
+        0.00E+00  0.00E+00  4.92E-02

 SIGMA - COV MATRIX FOR RANDOM EFFECTS - EPSILONS  ****
         EPS1      EPS2      EPS3
 EPS1
+        2.79E-02
 EPS2
+        7.06E-03  4.24E-02
 EPS3
+        8.54E-03  4.58E-03  3.24E-02

 OMEGA - CORR MATRIX FOR RANDOM EFFECTS - ETAS  *******
         ETA1      ETA2      ETA3
 ETA1
+        2.20E-01
 ETA2
+       -4.35E-01  2.14E-01
 ETA3
+        0.00E+00  0.00E+00  2.22E-01

 SIGMA - CORR MATRIX FOR RANDOM EFFECTS - EPSILONS  ***
         EPS1      EPS2      EPS3
 EPS1
+        1.67E-01
 EPS2
+        2.05E-01  2.06E-01
 EPS3
+        2.84E-01  1.24E-01  1.80E-01

 ********************                        FIRST ORDER CONDITIONAL ESTIMATION                      ********************
 ********************                            STANDARD ERROR OF ESTIMATE                          ********************

 THETA - VECTOR OF FIXED EFFECTS PARAMETERS   *********
         TH 1      TH 2      TH 3      TH 4      TH 5      TH 6      TH 7      TH 8      TH 9
         1.57E-02  1.61E-01  5.51E-03  3.26E-02  3.71E+00  3.97E-02  1.65E-03 ......... .........

 OMEGA - COV MATRIX FOR RANDOM EFFECTS - ETAS  ********
         ETA1      ETA2      ETA3
 ETA1
+        1.59E-02
 ETA2
+        1.22E-02  1.73E-02
 ETA3
+       ......... .........  2.46E-02

 SIGMA - COV MATRIX FOR RANDOM EFFECTS - EPSILONS  ****
         EPS1      EPS2      EPS3
 EPS1
+        4.14E-03
 EPS2
+        1.30E-03  6.44E-03
 EPS3
+        1.92E-03  2.20E-03  4.00E-03

 OMEGA - CORR MATRIX FOR RANDOM EFFECTS - ETAS  *******
         ETA1      ETA2      ETA3
 ETA1
+        3.63E-02
 ETA2
+        1.74E-01  4.05E-02
 ETA3
+       ......... .........  5.54E-02

 SIGMA - CORR MATRIX FOR RANDOM EFFECTS - EPSILONS  ***
         EPS1      EPS2      EPS3
 EPS1
+        1.24E-02
 EPS2
+        3.96E-02  1.56E-02
 EPS3
+        5.58E-02  6.32E-02  1.11E-02
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 Elapsed finaloutput time in seconds:     0.11
 #CPUT: Total CPU Time in Seconds,     1301.239
