Fri Nov  1 21:38:04 EDT 2019
$PROBLEM PK model 1 cmt base

$INPUT ID TIME MDV EVID DV AMT  SEX WT ETN
$DATA ../../../../../acop.csv IGNORE=@
$SUBROUTINES ADVAN2 TRANS2

$PK
ET=1
IF(ETN.EQ.3) ET=1.3
KA = THETA(1)*EXP(ETA(1))
CL = THETA(2)*((WT/70)**0.75)* EXP(ETA(2))
V = THETA(3)*EXP(ETA(3))
SC=V

$THETA
(0, 2)  ; KA
(0, 3)  ; CL
(0, 10) ; V2
(0.02)  ; RUVp
(1)     ; RUVa

$OMEGA
0.04
$OMEGA BLOCK(2)
0.05    ; iiv CL
0.01 0.2     ; iiv V2

$SIGMA
1 FIX

$ERROR
IPRED = F
IRES = DV-IPRED
W = IPRED*THETA(4) + THETA(5)
IF (W.EQ.0) W = 1
IWRES = IRES/W
Y= IPRED+W*ERR(1)

$EST METHOD=1 INTERACTION MAXEVAL=9999 SIG=3 PRINT=5 NOABORT POSTHOC
$COV

NM-TRAN MESSAGES
 WARNINGS AND ERRORS (IF ANY) FOR PROBLEM    1
 (WARNING  2) NM-TRAN INFERS THAT THE DATA ARE POPULATION.

1NONLINEAR MIXED EFFECTS MODEL PROGRAM (NONMEM) VERSION 7.4.3
 ORIGINALLY DEVELOPED BY STUART BEAL, LEWIS SHEINER, AND ALISON BOECKMANN
 CURRENT DEVELOPERS ARE ROBERT BAUER, ICON DEVELOPMENT SOLUTIONS,
 AND ALISON BOECKMANN. IMPLEMENTATION, EFFICIENCY, AND STANDARDIZATION
 PERFORMED BY NOUS INFOSYSTEMS.
 PROBLEM NO.:         1
 PK model 1 cmt base
 TOT. NO. OF OBS RECS:      760
 TOT. NO. OF INDIVIDUALS:       40
 ONE COMPARTMENT MODEL WITH FIRST-ORDER ABSORPTION (ADVAN2)
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 #TBLN:      1
 #METH: First Order Conditional Estimation with Interaction
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
 #TERM:
0MINIMIZATION SUCCESSFUL
 HOWEVER, PROBLEMS OCCURRED WITH THE MINIMIZATION.
 REGARD THE RESULTS OF THE ESTIMATION STEP CAREFULLY, AND ACCEPT THEM ONLY
 AFTER CHECKING THAT THE COVARIANCE STEP PRODUCES REASONABLE OUTPUT.
 NO. OF FUNCTION EVALUATIONS USED:      393
 NO. OF SIG. DIGITS IN FINAL EST.:  3.3

 ETABAR IS THE ARITHMETIC MEAN OF THE ETA-ESTIMATES,
 AND THE P-VALUE IS GIVEN FOR THE NULL HYPOTHESIS THAT THE TRUE MEAN IS 0.

 ETABAR:         8.9589E-02 -5.2136E-02  3.8020E+00
 SE:             1.5706E-02  1.5538E-02  1.0439E-01
 N:                      40          40          40

 P VAL.:         1.1732E-08  7.9295E-04  2.410E-290

 ETASHRINKSD(%)  6.7106E+01  6.4731E+01  2.9803E+01
 ETASHRINKVR(%)  8.9180E+01  8.7561E+01  5.0724E+01
 EBVSHRINKSD(%)  6.5211E+01  8.5498E+01  2.0265E+00
 EBVSHRINKVR(%)  8.7897E+01  9.7897E+01  4.0120E+00
 EPSSHRINKSD(%)  8.0262E+00
 EPSSHRINKVR(%)  1.5408E+01


 TOTAL DATA POINTS NORMALLY DISTRIBUTED (N):          760
 N*LOG(2PI) CONSTANT TO OBJECTIVE FUNCTION:    1396.7865704711026
 OBJECTIVE FUNCTION VALUE WITHOUT CONSTANT:    4432.4303213124467
 OBJECTIVE FUNCTION VALUE WITH CONSTANT:       5829.2168917835497
 REPORTED OBJECTIVE FUNCTION DOES NOT CONTAIN CONSTANT

 TOTAL EFFECTIVE ETAS (NIND*NETA):                           120


 #TERE:
 Elapsed estimation  time in seconds:    11.06

0PRED EXIT CODE = 1
0INDIVIDUAL NO.       3   ID= 3.00000000000000E+00   (WITHIN-INDIVIDUAL) DATA REC NO.   3
 THETA=
  2.75E+00   3.80E+00   1.26E+01  -1.27E-02   7.12E+00
 ETA=
  1.14E+03   9.26E-01  -1.91E+00
 OCCURS DURING SEARCH FOR ETA AT A NONZERO VALUE OF ETA
 F OR DERIVATIVE RETURNED BY PRED IS INFINITE (INF) OR NOT A NUMBER (NAN).
0PROGRAM TERMINATED BY OBJ
 Elapsed covariance  time in seconds:     1.38
 MESSAGE ISSUED FROM COVARIANCE STEP

 ********************               FIRST ORDER CONDITIONAL ESTIMATION WITH INTERACTION              ********************
 #OBJT:**************                       MINIMUM VALUE OF OBJECTIVE FUNCTION                      ********************
 #OBJV:********************************************     4432.430       **************************************************

 ********************               FIRST ORDER CONDITIONAL ESTIMATION WITH INTERACTION              ********************
 ********************                             FINAL PARAMETER ESTIMATE                           ********************

 THETA - VECTOR OF FIXED EFFECTS PARAMETERS   *********
         TH 1      TH 2      TH 3      TH 4      TH 5
         2.75E+00  3.80E+00  1.26E+01 -1.27E-02  7.12E+00

 OMEGA - COV MATRIX FOR RANDOM EFFECTS - ETAS  ********
         ETA1      ETA2      ETA3
 ETA1
+        9.35E-02
 ETA2
+        0.00E+00  7.96E-02
 ETA3
+        0.00E+00 -3.35E-02  9.07E-01

 SIGMA - COV MATRIX FOR RANDOM EFFECTS - EPSILONS  ****
         EPS1
 EPS1
+        1.00E+00

 OMEGA - CORR MATRIX FOR RANDOM EFFECTS - ETAS  *******
         ETA1      ETA2      ETA3
 ETA1
+        3.06E-01
 ETA2
+        0.00E+00  2.82E-01
 ETA3
+        0.00E+00 -1.25E-01  9.53E-01

 SIGMA - CORR MATRIX FOR RANDOM EFFECTS - EPSILONS  ***
         EPS1
 EPS1
+        1.00E+00
 #CPUT: Total CPU Time in Seconds,       12.431
