Tue Oct 15 18:52:37 EDT 2019
$PROB RUN# 1 DIRECT POPULATION PKPD MODEL
$INPUT C ID AMT TIME DV TYPE DROP
;TYPE 0 = PK, TYPE 1=PD
;DV=PK & PD DATA ORDERED BY ID, TIME
$DATA ../pkpd.csv IGNORE=C ;combined data set
$SUBROUTINE ADVAN2 TRANS2

$PK
 KA=THETA(1)*EXP(ETA(1))
 CL=THETA(2)*EXP(ETA(2))
 V=THETA(3)*EXP(ETA(3))
 S2=V
$ERROR
EMAX=THETA(4)*EXP(ETA(4))
EC50=THETA(5)*EXP(ETA(5))
E0=THETA(6)*EXP(ETA(6))
EFF=E0+EMAX*F/(EC50+F)+ERR(2)
CONC=F + F*ERR(1)
Y=EFF*TYPE + CONC*(1-TYPE)
TYP2=TYPE
IPRED=Y

$THETA
(0, 1.7)     ;KA
(0, 4.7)     ;CL
(0, 38)     ;V
(0, 100) ;EMAX
(0,5)  ;EC50
(0, 60) ;E0
$OMEGA
0.04
0.04
0.04
0.04
0.04
0.04

$SIGMA
0.04
5
$ESTIMATION MAXEVAL=9999 POSTHOC MSFO=./1.msf
$COV
$TABLE NOPRINT FILE=./1.tab ONEHEADER
ID TIME TYPE EVID EFF CONC IPRED TYP2

NM-TRAN MESSAGES
 WARNINGS AND ERRORS (IF ANY) FOR PROBLEM    1
 (WARNING  2) NM-TRAN INFERS THAT THE DATA ARE POPULATION.

1NONLINEAR MIXED EFFECTS MODEL PROGRAM (NONMEM) VERSION 7.4.3
 ORIGINALLY DEVELOPED BY STUART BEAL, LEWIS SHEINER, AND ALISON BOECKMANN
 CURRENT DEVELOPERS ARE ROBERT BAUER, ICON DEVELOPMENT SOLUTIONS,
 AND ALISON BOECKMANN. IMPLEMENTATION, EFFICIENCY, AND STANDARDIZATION
 PERFORMED BY NOUS INFOSYSTEMS.
 PROBLEM NO.:         1
 RUN# 1 DIRECT POPULATION PKPD MODEL
 TOT. NO. OF OBS RECS:      440
 TOT. NO. OF INDIVIDUALS:       20
 ONE COMPARTMENT MODEL WITH FIRST-ORDER ABSORPTION (ADVAN2)
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 #TBLN:      1
 #METH: First Order
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
 #TERM:
0MINIMIZATION SUCCESSFUL
 NO. OF FUNCTION EVALUATIONS USED:      404
 NO. OF SIG. DIGITS IN FINAL EST.:  3.3

 TOTAL DATA POINTS NORMALLY DISTRIBUTED (N):          440
 N*LOG(2PI) CONSTANT TO OBJECTIVE FUNCTION:    808.66590922011198
 OBJECTIVE FUNCTION VALUE WITHOUT CONSTANT:    1637.1924102732564
 OBJECTIVE FUNCTION VALUE WITH CONSTANT:       2445.8583194933685
 REPORTED OBJECTIVE FUNCTION DOES NOT CONTAIN CONSTANT

 TOTAL EFFECTIVE ETAS (NIND*NETA):                           120


 #TERE:
 Elapsed estimation  time in seconds:     0.19
 Elapsed covariance  time in seconds:     0.11
 Elapsed postprocess time in seconds:     0.02

 ********************                                   FIRST ORDER                                  ********************
 #OBJT:**************                       MINIMUM VALUE OF OBJECTIVE FUNCTION                      ********************
 #OBJV:********************************************     1637.192       **************************************************

 ********************                                   FIRST ORDER                                  ********************
 ********************                             FINAL PARAMETER ESTIMATE                           ********************

 THETA - VECTOR OF FIXED EFFECTS PARAMETERS   *********
         TH 1      TH 2      TH 3      TH 4      TH 5      TH 6
         3.97E+00  4.49E+00  4.07E+01  1.82E+02  7.29E+00  7.00E+01

 OMEGA - COV MATRIX FOR RANDOM EFFECTS - ETAS  ********
         ETA1      ETA2      ETA3      ETA4      ETA5      ETA6
 ETA1
+        1.22E+00
 ETA2
+        0.00E+00  3.41E-02
 ETA3
+        0.00E+00  0.00E+00  1.82E-02
 ETA4
+        0.00E+00  0.00E+00  0.00E+00  3.04E+00
 ETA5
+        0.00E+00  0.00E+00  0.00E+00  0.00E+00  3.94E+00
 ETA6
+        0.00E+00  0.00E+00  0.00E+00  0.00E+00  0.00E+00  4.34E-02

 SIGMA - COV MATRIX FOR RANDOM EFFECTS - EPSILONS  ****
         EPS1      EPS2
 EPS1
+        6.08E-02
 EPS2
+        0.00E+00  3.07E+01

 OMEGA - CORR MATRIX FOR RANDOM EFFECTS - ETAS  *******
         ETA1      ETA2      ETA3      ETA4      ETA5      ETA6
 ETA1
+        1.10E+00
 ETA2
+        0.00E+00  1.85E-01
 ETA3
+        0.00E+00  0.00E+00  1.35E-01
 ETA4
+        0.00E+00  0.00E+00  0.00E+00  1.74E+00
 ETA5
+        0.00E+00  0.00E+00  0.00E+00  0.00E+00  1.99E+00
 ETA6
+        0.00E+00  0.00E+00  0.00E+00  0.00E+00  0.00E+00  2.08E-01

 SIGMA - CORR MATRIX FOR RANDOM EFFECTS - EPSILONS  ***
         EPS1      EPS2
 EPS1
+        2.47E-01
 EPS2
+        0.00E+00  5.54E+00

 ********************                                   FIRST ORDER                                  ********************
 ********************                            STANDARD ERROR OF ESTIMATE                          ********************

 THETA - VECTOR OF FIXED EFFECTS PARAMETERS   *********
         TH 1      TH 2      TH 3      TH 4      TH 5      TH 6
         6.15E-01  2.16E-01  1.75E+00  2.76E+01  1.40E+00  3.22E+00

 OMEGA - COV MATRIX FOR RANDOM EFFECTS - ETAS  ********
         ETA1      ETA2      ETA3      ETA4      ETA5      ETA6
 ETA1
+        3.23E-01
 ETA2
+       .........  1.13E-02
 ETA3
+       ......... .........  7.27E-03
 ETA4
+       ......... ......... .........  9.74E-01
 ETA5
+       ......... ......... ......... .........  2.03E+00
 ETA6
+       ......... ......... ......... ......... .........  2.01E-02

 SIGMA - COV MATRIX FOR RANDOM EFFECTS - EPSILONS  ****
         EPS1      EPS2
 EPS1
+        5.77E-03
 EPS2
+       .........  2.78E+00

 OMEGA - CORR MATRIX FOR RANDOM EFFECTS - ETAS  *******
         ETA1      ETA2      ETA3      ETA4      ETA5      ETA6
 ETA1
+        1.47E-01
 ETA2
+       .........  3.07E-02
 ETA3
+       ......... .........  2.69E-02
 ETA4
+       ......... ......... .........  2.79E-01
 ETA5
+       ......... ......... ......... .........  5.12E-01
 ETA6
+       ......... ......... ......... ......... .........  4.82E-02

 SIGMA - CORR MATRIX FOR RANDOM EFFECTS - EPSILONS  ***
         EPS1      EPS2
 EPS1
+        1.17E-02
 EPS2
+       .........  2.51E-01
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 Elapsed finaloutput time in seconds:     0.02
 #CPUT: Total CPU Time in Seconds,        0.353
