Tue 11/29/2016
08:35 AM

;; 1. Based on:
;; 2. Description: PK model 1 cmt base WT-CL allom
;; x1. Author: coen

$PROBLEM PK model 1 cmt base

$INPUT ID TIME MDV EVID DV AMT  SEX WT ETN
$DATA ..\acop.csv IGNORE=@
$SUBROUTINES ADVAN2 TRANS2

$PK
ET=1
IF(ETN.EQ.3) ET=1.3
KA = THETA(1)
CL = THETA(2)*((WT/70)**0.75)* EXP(ETA(1))
V = THETA(3)*EXP(ETA(2))
SC=V

$THETA
(0, 2)  ; KA
(0, 3)  ; CL
(0, 10) ; V2
(0.02)  ; RUVp
(1)     ; RUVa

$OMEGA
0.05    ; iiv CL
0.2     ; iiv V2

$SIGMA
1 FIX

$ERROR
IPRED = F
IRES = DV-IPRED
W = IPRED*THETA(4) + THETA(5)
IF (W.EQ.0) W = 1
IWRES = IRES/W
Y= IPRED+W*ERR(1)

$EST METHOD=1 INTERACTION MAXEVAL=9999 SIG=3 PRINT=5 NOABORT POSTHOC MSFO=msf001
$COV PRINT=E
;$SIM (1234) NSUBPROBLEMS=1 ONLYSIM

$TABLE ID TIME DV MDV EVID IPRED IWRES ONEHEADER NOPRINT FILE=sdtab001

NM-TRAN MESSAGES
 WARNINGS AND ERRORS (IF ANY) FOR PROBLEM    1
 (WARNING  2) NM-TRAN INFERS THAT THE DATA ARE POPULATION.

1NONLINEAR MIXED EFFECTS MODEL PROGRAM (NONMEM) VERSION 7.4.0 alpha14 (nm74a14)
 ORIGINALLY DEVELOPED BY STUART BEAL, LEWIS SHEINER, AND ALISON BOECKMANN
 CURRENT DEVELOPERS ARE ROBERT BAUER, ICON DEVELOPMENT SOLUTIONS,
 AND ALISON BOECKMANN. IMPLEMENTATION, EFFICIENCY, AND STANDARDIZATION
 PERFORMED BY NOUS INFOSYSTEMS.
 PROBLEM NO.:         1
 PK model 1 cmt base
 TOT. NO. OF OBS RECS:      760
 TOT. NO. OF INDIVIDUALS:     40
 ONE COMPARTMENT MODEL WITH FIRST-ORDER ABSORPTION (ADVAN2)
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 #TBLN:      1
 #METH: First Order Conditional Estimation with Interaction
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
 #TERM:
0MINIMIZATION SUCCESSFUL
 NO. OF FUNCTION EVALUATIONS USED:      366
 NO. OF SIG. DIGITS IN FINAL EST.:  3.2

 ETABAR IS THE ARITHMETIC MEAN OF THE ETA-ESTIMATES,
 AND THE P-VALUE IS GIVEN FOR THE NULL HYPOTHESIS THAT THE TRUE MEAN IS 0.

 ETABAR:         1.7979E-03 -7.3828E-03
 SE:             3.9994E-02  5.9922E-02
 N:                      40          40

 P VAL.:         9.6414E-01  9.0194E-01

 ETASHRINKSD(%)  1.7511E+01  2.0591E+00
 ETASHRINKVR(%)  3.1955E+01  4.0757E+00
 EBVSHRINKSD(%)  1.8525E+01  2.5411E+00
 EBVSHRINKVR(%)  3.3618E+01  5.0177E+00
 EPSSHRINKSD(%)  4.0909E+00
 EPSSHRINKVR(%)  8.0145E+00


 TOTAL DATA POINTS NORMALLY DISTRIBUTED (N):          760
 N*LOG(2PI) CONSTANT TO OBJECTIVE FUNCTION:    1396.7865704711026
 OBJECTIVE FUNCTION VALUE WITHOUT CONSTANT:    2636.8457655204584
 OBJECTIVE FUNCTION VALUE WITH CONSTANT:       4033.6323359915609
 REPORTED OBJECTIVE FUNCTION DOES NOT CONTAIN CONSTANT

 TOTAL EFFECTIVE ETAS (NIND*NETA):                            80


 #TERE:
 Elapsed estimation  time in seconds:     3.21
 Elapsed covariance  time in seconds:     0.96
 Elapsed postprocess time in seconds:     0.04

 ********************               FIRST ORDER CONDITIONAL ESTIMATION WITH INTERACTION              ********************
 #OBJT:**************                       MINIMUM VALUE OF OBJECTIVE FUNCTION                      ********************
 #OBJV:********************************************     2636.846       **************************************************

 ********************               FIRST ORDER CONDITIONAL ESTIMATION WITH INTERACTION              ********************
 ********************                             FINAL PARAMETER ESTIMATE                           ********************

 THETA - VECTOR OF FIXED EFFECTS PARAMETERS   *********
         TH 1      TH 2      TH 3      TH 4      TH 5
         2.31E+00  5.50E+01  4.65E+02 -8.06E-02  4.13E+00

 OMEGA - COV MATRIX FOR RANDOM EFFECTS - ETAS  ********
         ETA1      ETA2
 ETA1
+        9.64E-02
 ETA2
+        0.00E+00  1.54E-01

 SIGMA - COV MATRIX FOR RANDOM EFFECTS - EPSILONS  ****
         EPS1
 EPS1
+        1.00E+00

 OMEGA - CORR MATRIX FOR RANDOM EFFECTS - ETAS  *******
         ETA1      ETA2
 ETA1
+        3.11E-01
 ETA2
+        0.00E+00  3.92E-01

 SIGMA - CORR MATRIX FOR RANDOM EFFECTS - EPSILONS  ***
         EPS1
 EPS1
+        1.00E+00

 ********************               FIRST ORDER CONDITIONAL ESTIMATION WITH INTERACTION              ********************
 ********************                            STANDARD ERROR OF ESTIMATE                          ********************

 THETA - VECTOR OF FIXED EFFECTS PARAMETERS   *********
         TH 1      TH 2      TH 3      TH 4      TH 5
         8.62E-02  3.33E+00  2.97E+01  5.55E-02  1.36E+00

 OMEGA - COV MATRIX FOR RANDOM EFFECTS - ETAS  ********
         ETA1      ETA2
 ETA1
+        2.21E-02
 ETA2
+       .........  2.96E-02

 SIGMA - COV MATRIX FOR RANDOM EFFECTS - EPSILONS  ****
         EPS1
 EPS1
+       .........

 OMEGA - CORR MATRIX FOR RANDOM EFFECTS - ETAS  *******
         ETA1      ETA2
 ETA1
+        3.57E-02
 ETA2
+       .........  3.77E-02

 SIGMA - CORR MATRIX FOR RANDOM EFFECTS - EPSILONS  ***
         EPS1
 EPS1
+       .........

 ********************               FIRST ORDER CONDITIONAL ESTIMATION WITH INTERACTION              ********************
 ********************                          COVARIANCE MATRIX OF ESTIMATE                         ********************

            TH 1      TH 2      TH 3      TH 4      TH 5      OM11      OM12      OM22      SG11
 TH 1
+        7.43E-03
 TH 2
+        1.26E-02  1.11E+01
 TH 3
+       -2.99E-01 -2.17E+01  8.79E+02
 TH 4
+       -2.77E-03  3.97E-02  9.69E-02  3.08E-03
 TH 5
+        6.53E-02 -1.08E+00 -4.28E+00 -7.50E-02  1.85E+00
 OM11
+        8.47E-05 -1.50E-02 -1.32E-01  1.40E-04 -3.16E-03  4.90E-04
 OM12
+       ......... ......... ......... ......... ......... ......... .........
 OM22
+        1.59E-04  3.65E-02 -2.73E-02  3.82E-04 -9.08E-03  1.36E-04 .........  8.74E-04
 SG11
+       ......... ......... ......... ......... ......... ......... ......... ......... .........

 ********************               FIRST ORDER CONDITIONAL ESTIMATION WITH INTERACTION              ********************
 ********************                          CORRELATION MATRIX OF ESTIMATE                        ********************

            TH 1      TH 2      TH 3      TH 4      TH 5      OM11      OM12      OM22      SG11
 TH 1
+        8.62E-02
 TH 2
+        4.41E-02  3.33E+00
 TH 3
+       -1.17E-01 -2.19E-01  2.97E+01
 TH 4
+       -5.78E-01  2.15E-01  5.89E-02  5.55E-02
 TH 5
+        5.58E-01 -2.38E-01 -1.06E-01 -9.93E-01  1.36E+00
 OM11
+        4.44E-02 -2.03E-01 -2.01E-01  1.14E-01 -1.05E-01  2.21E-02
 OM12
+       ......... ......... ......... ......... ......... ......... .........
 OM22
+        6.26E-02  3.71E-01 -3.11E-02  2.33E-01 -2.26E-01  2.07E-01 .........  2.96E-02
 SG11
+       ......... ......... ......... ......... ......... ......... ......... ......... .........
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
 ********************               FIRST ORDER CONDITIONAL ESTIMATION WITH INTERACTION              ********************
 ********************                      EIGENVALUES OF COR MATRIX OF ESTIMATE                     ********************

             1         2         3         4         5         6         7
         4.26E-03  3.50E-01  4.74E-01  9.31E-01  1.19E+00  1.48E+00  2.57E+00
 #CPUT: Total CPU Time in Seconds,        4.250
